*Heading
** Job name: sis_curvonly_1pc_v2 Model name: SIS_CurvOnly_1pc_v2_Run1_Denis
** Generated by: Abaqus/CAE 2023
*Preprint, echo=NO, model=NO, history=NO, contact=NO
**
** PARTS
**
*Part, name=MERGED
*Node
      1,   61.8411064,   27.7004566,  -137.396439
      2,   63.9729652,   26.5471058,  -137.396439
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*Element, type=S4R
   1,  500,  378, 5914,  501
   2,  378,  379, 5915, 5914
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*Element, type=S3R
3045, 7918, 7941, 7940
3783, 5069, 8492, 8491
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*Elset, elset=LO-1_PC-1_2DC-19_3DI-0
    1,    2,    3,    4,    5,    6
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*Elset, elset=LO-1_PC-1_2DC-636_3DI-0
  265,  266,  267,  268,  269,  270
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*Elset, elset=LO-1_PC-2_2DC-19_3DI-0
 1500, 1501, 1502, 1503, 1504, 1505
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*Elset, elset=LO-1_PC-2_2DC-636_3DI-0
 1487, 1488, 1489, 1490, 1491, 1492
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*Elset, elset=LO-1_PC-3_2DC-19_3DI-0
 1845, 1846, 1847, 1848, 1849, 1850
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*Elset, elset=LO-1_PC-3_2DC-636_3DI-0
 1851, 1852, 1853, 1854, 1855, 1856
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*Elset, elset=_SURFLO-1_SPOS, internal, generate
     1,  11900,      1
*Elset, elset=_SURFLO-2_SPOS, internal, generate
 11901,  13610,      1
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*Surface, type=ELEMENT, name=SURFLO-1
_SURFLO-1_SPOS, SPOS
*Surface, type=ELEMENT, name=SURFLO-2
_SURFLO-2_SPOS, SPOS
*Orientation, name=Ori-MERGED_ORI-1-DISCORIENT, system=RECTANGULAR
MERGED_ORI-1-DISCORIENT
3, 0.
** Region: (LAYUPLO-1-1: Generated From Layup), (Controls:EC-1)
*Elset, elset=LAYUPLO-1-1-1
    1,    2,    3,    4,    5,    6
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** Section: LAYUPLO-1-1
*Shell Section, elset=LAYUPLO-1-1-1, composite, orientation=Ori-MERGED_ORI-1-DISCORIENT, controls=EC-1, density=1.58e-09, layup=LAYUPLO-1
0.3, 3, ABQ_PLY_FABRIC_10, 45., PLY-1_LO-1_PC-1_19_0
0.3, 3, ABQ_PLY_FABRIC_10, 0., PLY-2_LO-1_PC-1_19_0
0.3, 3, ABQ_PLY_FABRIC_10, 45., PLY-3_LO-1_PC-1_19_0
0.3, 3, ABQ_PLY_FABRIC_10, -45., PLY-4_LO-1_PC-1_19_0
0.3, 3, ABQ_PLY_FABRIC_10, -45., PLY-5_LO-1_PC-1_19_0
0.3, 3, ABQ_PLY_FABRIC_10, 45., PLY-6_LO-1_PC-1_19_0
0.3, 3, ABQ_PLY_FABRIC_10, 0., PLY-7_LO-1_PC-1_19_0
0.3, 3, ABQ_PLY_FABRIC_10, 90., PLY-8_LO-1_PC-1_19_0
0.3, 3, ABQ_PLY_FABRIC_10, -45., PLY-9_LO-1_PC-1_19_0
0.3, 3, ABQ_PLY_FABRIC_10, 0., PLY-10_LO-1_PC-1_19_0
0.3, 3, ABQ_PLY_FABRIC_10, 0., PLY-11_LO-1_PC-1_19_0
0.3, 3, ABQ_PLY_FABRIC_10, -45., PLY-12_LO-1_PC-1_19_0
0.3, 3, ABQ_PLY_FABRIC_10, 90., PLY-13_LO-1_PC-1_19_0
0.3, 3, ABQ_PLY_FABRIC_10, 45., PLY-14_LO-1_PC-1_19_0
*Transverse Shear Stiffness
2250., 2250., 0.
** Region: (LAYUPLO-1-2: Generated From Layup), (Controls:EC-1)
*Elset, elset=LAYUPLO-1-2-1
  265,  266,  267,  268,  269,  270
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** Section: LAYUPLO-1-2
*Shell Section, elset=LAYUPLO-1-2-1, composite, orientation=Ori-MERGED_ORI-1-DISCORIENT, controls=EC-1, density=1.58e-09, layup=LAYUPLO-1
0.3, 3, ABQ_PLY_FABRIC_39, 45., PLY-1_LO-1_PC-1_636_0
0.3, 3, ABQ_PLY_FABRIC_39, 0., PLY-2_LO-1_PC-1_636_0
0.3, 3, ABQ_PLY_FABRIC_39, 45., PLY-3_LO-1_PC-1_636_0
0.3, 3, ABQ_PLY_FABRIC_39, -45., PLY-4_LO-1_PC-1_636_0
0.3, 3, ABQ_PLY_FABRIC_39, -45., PLY-5_LO-1_PC-1_636_0
0.3, 3, ABQ_PLY_FABRIC_39, 45., PLY-6_LO-1_PC-1_636_0
0.3, 3, ABQ_PLY_FABRIC_39, 0., PLY-7_LO-1_PC-1_636_0
0.3, 3, ABQ_PLY_FABRIC_39, 90., PLY-8_LO-1_PC-1_636_0
0.3, 3, ABQ_PLY_FABRIC_39, -45., PLY-9_LO-1_PC-1_636_0
0.3, 3, ABQ_PLY_FABRIC_39, 0., PLY-10_LO-1_PC-1_636_0
0.3, 3, ABQ_PLY_FABRIC_39, 0., PLY-11_LO-1_PC-1_636_0
0.3, 3, ABQ_PLY_FABRIC_39, -45., PLY-12_LO-1_PC-1_636_0
0.3, 3, ABQ_PLY_FABRIC_39, 90., PLY-13_LO-1_PC-1_636_0
0.3, 3, ABQ_PLY_FABRIC_39, 45., PLY-14_LO-1_PC-1_636_0
*Transverse Shear Stiffness
2250., 2250., 0.
** Region: (LAYUPLO-1-3: Generated From Layup), (Controls:EC-1)
*Elset, elset=LAYUPLO-1-3-1
 1487, 1488, 1489, 1490, 1491, 1492
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** Section: LAYUPLO-1-3
*Shell Section, elset=LAYUPLO-1-3-1, composite, orientation=Ori-MERGED_ORI-1-DISCORIENT, controls=EC-1, density=1.58e-09, layup=LAYUPLO-1
0.3, 3, ABQ_PLY_FABRIC_39, 45., PLY-1_LO-1_PC-2_636_0
0.3, 3, ABQ_PLY_FABRIC_39, 45., PLY-3_LO-1_PC-2_636_0
0.3, 3, ABQ_PLY_FABRIC_39, -45., PLY-4_LO-1_PC-2_636_0
0.3, 3, ABQ_PLY_FABRIC_39, -45., PLY-5_LO-1_PC-2_636_0
0.3, 3, ABQ_PLY_FABRIC_39, 45., PLY-6_LO-1_PC-2_636_0
0.3, 3, ABQ_PLY_FABRIC_39, 0., PLY-7_LO-1_PC-2_636_0
0.3, 3, ABQ_PLY_FABRIC_39, 90., PLY-8_LO-1_PC-2_636_0
0.3, 3, ABQ_PLY_FABRIC_39, -45., PLY-9_LO-1_PC-2_636_0
0.3, 3, ABQ_PLY_FABRIC_39, 0., PLY-10_LO-1_PC-2_636_0
0.3, 3, ABQ_PLY_FABRIC_39, 0., PLY-11_LO-1_PC-2_636_0
0.3, 3, ABQ_PLY_FABRIC_39, -45., PLY-12_LO-1_PC-2_636_0
0.3, 3, ABQ_PLY_FABRIC_39, 90., PLY-13_LO-1_PC-2_636_0
0.3, 3, ABQ_PLY_FABRIC_39, 45., PLY-14_LO-1_PC-2_636_0
*Transverse Shear Stiffness
2250., 2250., 0.
** Region: (LAYUPLO-1-19: Generated From Layup), (Controls:EC-1)
*Elset, elset=LAYUPLO-1-19-1
 1500, 1501, 1502, 1503, 1504, 1505
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** Section: LAYUPLO-1-19
*Shell Section, elset=LAYUPLO-1-19-1, composite, orientation=Ori-MERGED_ORI-1-DISCORIENT, controls=EC-1, density=1.58e-09, layup=LAYUPLO-1
0.3, 3, ABQ_PLY_FABRIC_10, 45., PLY-1_LO-1_PC-2_19_0
0.3, 3, ABQ_PLY_FABRIC_10, 45., PLY-3_LO-1_PC-2_19_0
0.3, 3, ABQ_PLY_FABRIC_10, -45., PLY-4_LO-1_PC-2_19_0
0.3, 3, ABQ_PLY_FABRIC_10, -45., PLY-5_LO-1_PC-2_19_0
0.3, 3, ABQ_PLY_FABRIC_10, 45., PLY-6_LO-1_PC-2_19_0
0.3, 3, ABQ_PLY_FABRIC_10, 0., PLY-7_LO-1_PC-2_19_0
0.3, 3, ABQ_PLY_FABRIC_10, 90., PLY-8_LO-1_PC-2_19_0
0.3, 3, ABQ_PLY_FABRIC_10, -45., PLY-9_LO-1_PC-2_19_0
0.3, 3, ABQ_PLY_FABRIC_10, 0., PLY-10_LO-1_PC-2_19_0
0.3, 3, ABQ_PLY_FABRIC_10, 0., PLY-11_LO-1_PC-2_19_0
0.3, 3, ABQ_PLY_FABRIC_10, -45., PLY-12_LO-1_PC-2_19_0
0.3, 3, ABQ_PLY_FABRIC_10, 90., PLY-13_LO-1_PC-2_19_0
0.3, 3, ABQ_PLY_FABRIC_10, 45., PLY-14_LO-1_PC-2_19_0
*Transverse Shear Stiffness
2250., 2250., 0.
** Region: (LAYUPLO-1-5: Generated From Layup), (Controls:EC-1)
*Elset, elset=LAYUPLO-1-5-1
 1845, 1846, 1847, 1848, 1849, 1850
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** Section: LAYUPLO-1-5
*Shell Section, elset=LAYUPLO-1-5-1, composite, orientation=Ori-MERGED_ORI-1-DISCORIENT, controls=EC-1, density=1.58e-09, layup=LAYUPLO-1
0.3, 3, ABQ_PLY_FABRIC_10, 45., PLY-1_LO-1_PC-3_19_0
0.3, 3, ABQ_PLY_FABRIC_10, -45., PLY-4_LO-1_PC-3_19_0
0.3, 3, ABQ_PLY_FABRIC_10, -45., PLY-5_LO-1_PC-3_19_0
0.3, 3, ABQ_PLY_FABRIC_10, 45., PLY-6_LO-1_PC-3_19_0
0.3, 3, ABQ_PLY_FABRIC_10, 0., PLY-7_LO-1_PC-3_19_0
0.3, 3, ABQ_PLY_FABRIC_10, 90., PLY-8_LO-1_PC-3_19_0
0.3, 3, ABQ_PLY_FABRIC_10, -45., PLY-9_LO-1_PC-3_19_0
0.3, 3, ABQ_PLY_FABRIC_10, 0., PLY-10_LO-1_PC-3_19_0
0.3, 3, ABQ_PLY_FABRIC_10, 0., PLY-11_LO-1_PC-3_19_0
0.3, 3, ABQ_PLY_FABRIC_10, -45., PLY-12_LO-1_PC-3_19_0
0.3, 3, ABQ_PLY_FABRIC_10, 90., PLY-13_LO-1_PC-3_19_0
0.3, 3, ABQ_PLY_FABRIC_10, 45., PLY-14_LO-1_PC-3_19_0
*Transverse Shear Stiffness
2250., 2250., 0.
** Region: (LAYUPLO-1-21: Generated From Layup), (Controls:EC-1)
*Elset, elset=LAYUPLO-1-21-1
 1851, 1852, 1853, 1854, 1855, 1856
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** Section: LAYUPLO-1-21
*Shell Section, elset=LAYUPLO-1-21-1, composite, orientation=Ori-MERGED_ORI-1-DISCORIENT, controls=EC-1, density=1.58e-09, layup=LAYUPLO-1
0.3, 3, ABQ_PLY_FABRIC_39, 45., PLY-1_LO-1_PC-3_636_0
0.3, 3, ABQ_PLY_FABRIC_39, -45., PLY-4_LO-1_PC-3_636_0
0.3, 3, ABQ_PLY_FABRIC_39, -45., PLY-5_LO-1_PC-3_636_0
0.3, 3, ABQ_PLY_FABRIC_39, 45., PLY-6_LO-1_PC-3_636_0
0.3, 3, ABQ_PLY_FABRIC_39, 0., PLY-7_LO-1_PC-3_636_0
0.3, 3, ABQ_PLY_FABRIC_39, 90., PLY-8_LO-1_PC-3_636_0
0.3, 3, ABQ_PLY_FABRIC_39, -45., PLY-9_LO-1_PC-3_636_0
0.3, 3, ABQ_PLY_FABRIC_39, 0., PLY-10_LO-1_PC-3_636_0
0.3, 3, ABQ_PLY_FABRIC_39, 0., PLY-11_LO-1_PC-3_636_0
0.3, 3, ABQ_PLY_FABRIC_39, -45., PLY-12_LO-1_PC-3_636_0
0.3, 3, ABQ_PLY_FABRIC_39, 90., PLY-13_LO-1_PC-3_636_0
0.3, 3, ABQ_PLY_FABRIC_39, 45., PLY-14_LO-1_PC-3_636_0
*Transverse Shear Stiffness
2250., 2250., 0.
** Region: (LAYUPLO-1-4: Generated From Layup), (Controls:EC-1)
*Elset, elset=LAYUPLO-1-4-1
  2436,  2437,  2438,  2439,  2440,  2441
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** Section: LAYUPLO-1-4
*Shell Section, elset=LAYUPLO-1-4-1, composite, orientation=Ori-MERGED_ORI-1-DISCORIENT, controls=EC-1, density=1.58e-09, layup=LAYUPLO-1
0.3, 3, ABQ_PLY_FABRIC_10, 45., PLY-1_LO-1_PC-4_19_0
0.3, 3, ABQ_PLY_FABRIC_10, -45., PLY-5_LO-1_PC-4_19_0
0.3, 3, ABQ_PLY_FABRIC_10, 45., PLY-6_LO-1_PC-4_19_0
0.3, 3, ABQ_PLY_FABRIC_10, 0., PLY-7_LO-1_PC-4_19_0
0.3, 3, ABQ_PLY_FABRIC_10, 90., PLY-8_LO-1_PC-4_19_0
0.3, 3, ABQ_PLY_FABRIC_10, -45., PLY-9_LO-1_PC-4_19_0
0.3, 3, ABQ_PLY_FABRIC_10, 0., PLY-10_LO-1_PC-4_19_0
0.3, 3, ABQ_PLY_FABRIC_10, 0., PLY-11_LO-1_PC-4_19_0
0.3, 3, ABQ_PLY_FABRIC_10, -45., PLY-12_LO-1_PC-4_19_0
0.3, 3, ABQ_PLY_FABRIC_10, 90., PLY-13_LO-1_PC-4_19_0
0.3, 3, ABQ_PLY_FABRIC_10, 45., PLY-14_LO-1_PC-4_19_0
*Transverse Shear Stiffness
2250., 2250., 0.
** Region: (LAYUPLO-1-34: Generated From Layup), (Controls:EC-1)
*Elset, elset=LAYUPLO-1-34-1
 2504, 2505, 2506, 2507, 2508, 2509
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** Section: LAYUPLO-1-34
*Shell Section, elset=LAYUPLO-1-34-1, composite, orientation=Ori-MERGED_ORI-1-DISCORIENT, controls=EC-1, density=1.58e-09, layup=LAYUPLO-1
0.3, 3, ABQ_PLY_FABRIC_39, 45., PLY-1_LO-1_PC-4_636_0
0.3, 3, ABQ_PLY_FABRIC_39, -45., PLY-5_LO-1_PC-4_636_0
0.3, 3, ABQ_PLY_FABRIC_39, 45., PLY-6_LO-1_PC-4_636_0
0.3, 3, ABQ_PLY_FABRIC_39, 0., PLY-7_LO-1_PC-4_636_0
0.3, 3, ABQ_PLY_FABRIC_39, 90., PLY-8_LO-1_PC-4_636_0
0.3, 3, ABQ_PLY_FABRIC_39, -45., PLY-9_LO-1_PC-4_636_0
0.3, 3, ABQ_PLY_FABRIC_39, 0., PLY-10_LO-1_PC-4_636_0
0.3, 3, ABQ_PLY_FABRIC_39, 0., PLY-11_LO-1_PC-4_636_0
0.3, 3, ABQ_PLY_FABRIC_39, -45., PLY-12_LO-1_PC-4_636_0
0.3, 3, ABQ_PLY_FABRIC_39, 90., PLY-13_LO-1_PC-4_636_0
0.3, 3, ABQ_PLY_FABRIC_39, 45., PLY-14_LO-1_PC-4_636_0
*Transverse Shear Stiffness
2250., 2250., 0.
** Region: (LAYUPLO-1-22: Generated From Layup), (Controls:EC-1)
*Elset, elset=LAYUPLO-1-22-1
  2551,  2552,  2553,  2554,  2555,  2556
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** Section: LAYUPLO-1-22
*Shell Section, elset=LAYUPLO-1-22-1, composite, orientation=Ori-MERGED_ORI-1-DISCORIENT, controls=EC-1, density=1.58e-09, layup=LAYUPLO-1
0.3, 3, ABQ_PLY_FABRIC_39, 45., PLY-1_LO-1_PC-5_636_0
0.3, 3, ABQ_PLY_FABRIC_39, 45., PLY-6_LO-1_PC-5_636_0
0.3, 3, ABQ_PLY_FABRIC_39, 0., PLY-7_LO-1_PC-5_636_0
0.3, 3, ABQ_PLY_FABRIC_39, 90., PLY-8_LO-1_PC-5_636_0
0.3, 3, ABQ_PLY_FABRIC_39, -45., PLY-9_LO-1_PC-5_636_0
0.3, 3, ABQ_PLY_FABRIC_39, 0., PLY-10_LO-1_PC-5_636_0
0.3, 3, ABQ_PLY_FABRIC_39, 0., PLY-11_LO-1_PC-5_636_0
0.3, 3, ABQ_PLY_FABRIC_39, -45., PLY-12_LO-1_PC-5_636_0
0.3, 3, ABQ_PLY_FABRIC_39, 90., PLY-13_LO-1_PC-5_636_0
0.3, 3, ABQ_PLY_FABRIC_39, 45., PLY-14_LO-1_PC-5_636_0
*Transverse Shear Stiffness
2250., 2250., 0.
** Region: (LAYUPLO-1-35: Generated From Layup), (Controls:EC-1)
*Elset, elset=LAYUPLO-1-35-1
  2586,  2587,  2588,  2589,  2590,  2591
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** Section: LAYUPLO-1-35
*Shell Section, elset=LAYUPLO-1-35-1, composite, orientation=Ori-MERGED_ORI-1-DISCORIENT, controls=EC-1, density=1.58e-09, layup=LAYUPLO-1
0.3, 3, ABQ_PLY_FABRIC_10, 45., PLY-1_LO-1_PC-5_19_0
0.3, 3, ABQ_PLY_FABRIC_10, 45., PLY-6_LO-1_PC-5_19_0
0.3, 3, ABQ_PLY_FABRIC_10, 0., PLY-7_LO-1_PC-5_19_0
0.3, 3, ABQ_PLY_FABRIC_10, 90., PLY-8_LO-1_PC-5_19_0
0.3, 3, ABQ_PLY_FABRIC_10, -45., PLY-9_LO-1_PC-5_19_0
0.3, 3, ABQ_PLY_FABRIC_10, 0., PLY-10_LO-1_PC-5_19_0
0.3, 3, ABQ_PLY_FABRIC_10, 0., PLY-11_LO-1_PC-5_19_0
0.3, 3, ABQ_PLY_FABRIC_10, -45., PLY-12_LO-1_PC-5_19_0
0.3, 3, ABQ_PLY_FABRIC_10, 90., PLY-13_LO-1_PC-5_19_0
0.3, 3, ABQ_PLY_FABRIC_10, 45., PLY-14_LO-1_PC-5_19_0
*Transverse Shear Stiffness
2250., 2250., 0.
** Region: (LAYUPLO-1-20: Generated From Layup), (Controls:EC-1)
*Elset, elset=LAYUPLO-1-20-1
  2651,  2652,  2653,  2654,  2655,  2656
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** Section: LAYUPLO-1-20
*Shell Section, elset=LAYUPLO-1-20-1, composite, orientation=Ori-MERGED_ORI-1-DISCORIENT, controls=EC-1, density=1.58e-09, layup=LAYUPLO-1
0.3, 3, ABQ_PLY_FABRIC_10, 45., PLY-1_LO-1_PC-6_19_0
0.3, 3, ABQ_PLY_FABRIC_10, 0., PLY-7_LO-1_PC-6_19_0
0.3, 3, ABQ_PLY_FABRIC_10, 90., PLY-8_LO-1_PC-6_19_0
0.3, 3, ABQ_PLY_FABRIC_10, -45., PLY-9_LO-1_PC-6_19_0
0.3, 3, ABQ_PLY_FABRIC_10, 0., PLY-10_LO-1_PC-6_19_0
0.3, 3, ABQ_PLY_FABRIC_10, 0., PLY-11_LO-1_PC-6_19_0
0.3, 3, ABQ_PLY_FABRIC_10, -45., PLY-12_LO-1_PC-6_19_0
0.3, 3, ABQ_PLY_FABRIC_10, 90., PLY-13_LO-1_PC-6_19_0
0.3, 3, ABQ_PLY_FABRIC_10, 45., PLY-14_LO-1_PC-6_19_0
*Transverse Shear Stiffness
2250., 2250., 0.
** Region: (LAYUPLO-1-36: Generated From Layup), (Controls:EC-1)
*Elset, elset=LAYUPLO-1-36-1
  2728,  2729,  2730,  2731,  2732,  2733
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** Section: LAYUPLO-1-36
*Shell Section, elset=LAYUPLO-1-36-1, composite, orientation=Ori-MERGED_ORI-1-DISCORIENT, controls=EC-1, density=1.58e-09, layup=LAYUPLO-1
0.3, 3, ABQ_PLY_FABRIC_39, 45., PLY-1_LO-1_PC-6_636_0
0.3, 3, ABQ_PLY_FABRIC_39, 0., PLY-7_LO-1_PC-6_636_0
0.3, 3, ABQ_PLY_FABRIC_39, 90., PLY-8_LO-1_PC-6_636_0
0.3, 3, ABQ_PLY_FABRIC_39, -45., PLY-9_LO-1_PC-6_636_0
0.3, 3, ABQ_PLY_FABRIC_39, 0., PLY-10_LO-1_PC-6_636_0
0.3, 3, ABQ_PLY_FABRIC_39, 0., PLY-11_LO-1_PC-6_636_0
0.3, 3, ABQ_PLY_FABRIC_39, -45., PLY-12_LO-1_PC-6_636_0
0.3, 3, ABQ_PLY_FABRIC_39, 90., PLY-13_LO-1_PC-6_636_0
0.3, 3, ABQ_PLY_FABRIC_39, 45., PLY-14_LO-1_PC-6_636_0
*Transverse Shear Stiffness
2250., 2250., 0.
** Region: (LAYUPLO-1-23: Generated From Layup), (Controls:EC-1)
*Elset, elset=LAYUPLO-1-23-13
  2810,  2811,  2812,  2813,  2814,  2815
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** Section: LAYUPLO-1-23
*Shell Section, elset=LAYUPLO-1-23-13, composite, orientation=Ori-MERGED_ORI-1-DISCORIENT, controls=EC-1, density=1.58e-09, layup=LAYUPLO-1
0.3, 3, ABQ_PLY_FABRIC_10, 45., PLY-1_LO-1_PC-7_19_0
0.3, 3, ABQ_PLY_FABRIC_10, 90., PLY-8_LO-1_PC-7_19_0
0.3, 3, ABQ_PLY_FABRIC_10, -45., PLY-9_LO-1_PC-7_19_0
0.3, 3, ABQ_PLY_FABRIC_10, 0., PLY-10_LO-1_PC-7_19_0
0.3, 3, ABQ_PLY_FABRIC_10, 0., PLY-11_LO-1_PC-7_19_0
0.3, 3, ABQ_PLY_FABRIC_10, -45., PLY-12_LO-1_PC-7_19_0
0.3, 3, ABQ_PLY_FABRIC_10, 90., PLY-13_LO-1_PC-7_19_0
0.3, 3, ABQ_PLY_FABRIC_10, 45., PLY-14_LO-1_PC-7_19_0
*Transverse Shear Stiffness
2250., 2250., 0.
** Region: (LAYUPLO-1-23: Generated From Layup), (Controls:Default)
*Elset, elset=LAYUPLO-1-23-14
  3045, 11854
** Section: LAYUPLO-1-23
*Shell Section, elset=LAYUPLO-1-23-14, composite, orientation=Ori-MERGED_ORI-1-DISCORIENT, density=1.58e-09, layup=LAYUPLO-1
0.3, 3, ABQ_PLY_FABRIC_10, 45., PLY-1_LO-1_PC-7_19_0
0.3, 3, ABQ_PLY_FABRIC_10, 90., PLY-8_LO-1_PC-7_19_0
0.3, 3, ABQ_PLY_FABRIC_10, -45., PLY-9_LO-1_PC-7_19_0
0.3, 3, ABQ_PLY_FABRIC_10, 0., PLY-10_LO-1_PC-7_19_0
0.3, 3, ABQ_PLY_FABRIC_10, 0., PLY-11_LO-1_PC-7_19_0
0.3, 3, ABQ_PLY_FABRIC_10, -45., PLY-12_LO-1_PC-7_19_0
0.3, 3, ABQ_PLY_FABRIC_10, 90., PLY-13_LO-1_PC-7_19_0
0.3, 3, ABQ_PLY_FABRIC_10, 45., PLY-14_LO-1_PC-7_19_0
*Transverse Shear Stiffness
2250., 2250., 0.
** Region: (LAYUPLO-1-37: Generated From Layup), (Controls:EC-1)
*Elset, elset=LAYUPLO-1-37-15
 3046, 3047, 3048, 3049, 3050, 3051
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** Section: LAYUPLO-1-37
*Shell Section, elset=LAYUPLO-1-37-15, composite, orientation=Ori-MERGED_ORI-1-DISCORIENT, controls=EC-1, density=1.58e-09, layup=LAYUPLO-1
0.3, 3, ABQ_PLY_FABRIC_38, 45., PLY-1_LO-1_PC-7_459_0
0.3, 3, ABQ_PLY_FABRIC_38, 90., PLY-8_LO-1_PC-7_459_0
0.3, 3, ABQ_PLY_FABRIC_38, -45., PLY-9_LO-1_PC-7_459_0
0.3, 3, ABQ_PLY_FABRIC_38, 0., PLY-10_LO-1_PC-7_459_0
0.3, 3, ABQ_PLY_FABRIC_38, 0., PLY-11_LO-1_PC-7_459_0
0.3, 3, ABQ_PLY_FABRIC_38, -45., PLY-12_LO-1_PC-7_459_0
0.3, 3, ABQ_PLY_FABRIC_38, 90., PLY-13_LO-1_PC-7_459_0
0.3, 3, ABQ_PLY_FABRIC_38, 45., PLY-14_LO-1_PC-7_459_0
*Transverse Shear Stiffness
2250., 2250., 0.
** Region: (LAYUPLO-1-24: Generated From Layup), (Controls:EC-1)
*Elset, elset=LAYUPLO-1-24
  3078,  3079,  3080,  3081,  3082,  3083
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** Section: LAYUPLO-1-24
*Shell Section, elset=LAYUPLO-1-24, composite, orientation=Ori-MERGED_ORI-1-DISCORIENT, controls=EC-1, density=1.58e-09, layup=LAYUPLO-1
0.3, 3, ABQ_PLY_FABRIC_39, 45., PLY-1_LO-1_PC-7_636_0
0.3, 3, ABQ_PLY_FABRIC_39, 90., PLY-8_LO-1_PC-7_636_0
0.3, 3, ABQ_PLY_FABRIC_39, -45., PLY-9_LO-1_PC-7_636_0
0.3, 3, ABQ_PLY_FABRIC_39, 0., PLY-10_LO-1_PC-7_636_0
0.3, 3, ABQ_PLY_FABRIC_39, 0., PLY-11_LO-1_PC-7_636_0
0.3, 3, ABQ_PLY_FABRIC_39, -45., PLY-12_LO-1_PC-7_636_0
0.3, 3, ABQ_PLY_FABRIC_39, 90., PLY-13_LO-1_PC-7_636_0
0.3, 3, ABQ_PLY_FABRIC_39, 45., PLY-14_LO-1_PC-7_636_0
*Transverse Shear Stiffness
2250., 2250., 0.
** Region: (LAYUPLO-1-25: Generated From Layup), (Controls:EC-1)
*Elset, elset=LAYUPLO-1-25-17
  3394,  3395,  3396,  3397,  3398,  3399
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** Section: LAYUPLO-1-25
*Shell Section, elset=LAYUPLO-1-25-17, composite, orientation=Ori-MERGED_ORI-1-DISCORIENT, controls=EC-1, density=1.58e-09, layup=LAYUPLO-1
0.3, 3, ABQ_PLY_FABRIC_9, 45., PLY-1_LO-1_PC-7_18_0
0.3, 3, ABQ_PLY_FABRIC_9, 90., PLY-8_LO-1_PC-7_18_0
0.3, 3, ABQ_PLY_FABRIC_9, -45., PLY-9_LO-1_PC-7_18_0
0.3, 3, ABQ_PLY_FABRIC_9, 0., PLY-10_LO-1_PC-7_18_0
0.3, 3, ABQ_PLY_FABRIC_9, 0., PLY-11_LO-1_PC-7_18_0
0.3, 3, ABQ_PLY_FABRIC_9, -45., PLY-12_LO-1_PC-7_18_0
0.3, 3, ABQ_PLY_FABRIC_9, 90., PLY-13_LO-1_PC-7_18_0
0.3, 3, ABQ_PLY_FABRIC_9, 45., PLY-14_LO-1_PC-7_18_0
*Transverse Shear Stiffness
2250., 2250., 0.
** Region: (LAYUPLO-1-37: Generated From Layup), (Controls:Default)
*Elset, elset=LAYUPLO-1-37-18
 3783, 4015, 4603, 4829, 5147, 5201, 5379, 5421
** Section: LAYUPLO-1-37
*Shell Section, elset=LAYUPLO-1-37-18, composite, orientation=Ori-MERGED_ORI-1-DISCORIENT, density=1.58e-09, layup=LAYUPLO-1
0.3, 3, ABQ_PLY_FABRIC_38, 45., PLY-1_LO-1_PC-7_459_0
0.3, 3, ABQ_PLY_FABRIC_38, 90., PLY-8_LO-1_PC-7_459_0
0.3, 3, ABQ_PLY_FABRIC_38, -45., PLY-9_LO-1_PC-7_459_0
0.3, 3, ABQ_PLY_FABRIC_38, 0., PLY-10_LO-1_PC-7_459_0
0.3, 3, ABQ_PLY_FABRIC_38, 0., PLY-11_LO-1_PC-7_459_0
0.3, 3, ABQ_PLY_FABRIC_38, -45., PLY-12_LO-1_PC-7_459_0
0.3, 3, ABQ_PLY_FABRIC_38, 90., PLY-13_LO-1_PC-7_459_0
0.3, 3, ABQ_PLY_FABRIC_38, 45., PLY-14_LO-1_PC-7_459_0
*Transverse Shear Stiffness
2250., 2250., 0.
** Region: (LAYUPLO-1-25: Generated From Layup), (Controls:Default)
*Elset, elset=LAYUPLO-1-25-19
 4673, 4719, 5855, 5933
** Section: LAYUPLO-1-25
*Shell Section, elset=LAYUPLO-1-25-19, composite, orientation=Ori-MERGED_ORI-1-DISCORIENT, density=1.58e-09, layup=LAYUPLO-1
0.3, 3, ABQ_PLY_FABRIC_9, 45., PLY-1_LO-1_PC-7_18_0
0.3, 3, ABQ_PLY_FABRIC_9, 90., PLY-8_LO-1_PC-7_18_0
0.3, 3, ABQ_PLY_FABRIC_9, -45., PLY-9_LO-1_PC-7_18_0
0.3, 3, ABQ_PLY_FABRIC_9, 0., PLY-10_LO-1_PC-7_18_0
0.3, 3, ABQ_PLY_FABRIC_9, 0., PLY-11_LO-1_PC-7_18_0
0.3, 3, ABQ_PLY_FABRIC_9, -45., PLY-12_LO-1_PC-7_18_0
0.3, 3, ABQ_PLY_FABRIC_9, 90., PLY-13_LO-1_PC-7_18_0
0.3, 3, ABQ_PLY_FABRIC_9, 45., PLY-14_LO-1_PC-7_18_0
*Transverse Shear Stiffness
2250., 2250., 0.
** Region: (LAYUPLO-1-38: Generated From Layup), (Controls:EC-1)
*Elset, elset=LAYUPLO-1-38-20
  5312,  5313,  5314,  5315,  5316,  5317
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** Section: LAYUPLO-1-38
*Shell Section, elset=LAYUPLO-1-38-20, composite, orientation=Ori-MERGED_ORI-1-DISCORIENT, controls=EC-1, density=1.58e-09, layup=LAYUPLO-1
0.3, 3, ABQ_PLY_FABRIC_37, 45., PLY-1_LO-1_PC-7_349_0
0.3, 3, ABQ_PLY_FABRIC_37, 90., PLY-8_LO-1_PC-7_349_0
0.3, 3, ABQ_PLY_FABRIC_37, -45., PLY-9_LO-1_PC-7_349_0
0.3, 3, ABQ_PLY_FABRIC_37, 0., PLY-10_LO-1_PC-7_349_0
0.3, 3, ABQ_PLY_FABRIC_37, 0., PLY-11_LO-1_PC-7_349_0
0.3, 3, ABQ_PLY_FABRIC_37, -45., PLY-12_LO-1_PC-7_349_0
0.3, 3, ABQ_PLY_FABRIC_37, 90., PLY-13_LO-1_PC-7_349_0
0.3, 3, ABQ_PLY_FABRIC_37, 45., PLY-14_LO-1_PC-7_349_0
*Transverse Shear Stiffness
2250., 2250., 0.
** Region: (LAYUPLO-1-38: Generated From Layup), (Controls:Default)
*Elset, elset=LAYUPLO-1-38-21
  5597,  5811,  6171,  6189,  6371, 11528
** Section: LAYUPLO-1-38
*Shell Section, elset=LAYUPLO-1-38-21, composite, orientation=Ori-MERGED_ORI-1-DISCORIENT, density=1.58e-09, layup=LAYUPLO-1
0.3, 3, ABQ_PLY_FABRIC_37, 45., PLY-1_LO-1_PC-7_349_0
0.3, 3, ABQ_PLY_FABRIC_37, 90., PLY-8_LO-1_PC-7_349_0
0.3, 3, ABQ_PLY_FABRIC_37, -45., PLY-9_LO-1_PC-7_349_0
0.3, 3, ABQ_PLY_FABRIC_37, 0., PLY-10_LO-1_PC-7_349_0
0.3, 3, ABQ_PLY_FABRIC_37, 0., PLY-11_LO-1_PC-7_349_0
0.3, 3, ABQ_PLY_FABRIC_37, -45., PLY-12_LO-1_PC-7_349_0
0.3, 3, ABQ_PLY_FABRIC_37, 90., PLY-13_LO-1_PC-7_349_0
0.3, 3, ABQ_PLY_FABRIC_37, 45., PLY-14_LO-1_PC-7_349_0
*Transverse Shear Stiffness
2250., 2250., 0.
** Region: (LAYUPLO-1-26: Generated From Layup), (Controls:EC-1)
*Elset, elset=LAYUPLO-1-26-22
 6232, 6233, 6234, 6235, 6236, 6237
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** Section: LAYUPLO-1-26
*Shell Section, elset=LAYUPLO-1-26-22, composite, orientation=Ori-MERGED_ORI-1-DISCORIENT, controls=EC-1, density=1.58e-09, layup=LAYUPLO-1
0.3, 3, ABQ_PLY_FABRIC_8, 45., PLY-1_LO-1_PC-7_17_0
0.3, 3, ABQ_PLY_FABRIC_8, 90., PLY-8_LO-1_PC-7_17_0
0.3, 3, ABQ_PLY_FABRIC_8, -45., PLY-9_LO-1_PC-7_17_0
0.3, 3, ABQ_PLY_FABRIC_8, 0., PLY-10_LO-1_PC-7_17_0
0.3, 3, ABQ_PLY_FABRIC_8, 0., PLY-11_LO-1_PC-7_17_0
0.3, 3, ABQ_PLY_FABRIC_8, -45., PLY-12_LO-1_PC-7_17_0
0.3, 3, ABQ_PLY_FABRIC_8, 90., PLY-13_LO-1_PC-7_17_0
0.3, 3, ABQ_PLY_FABRIC_8, 45., PLY-14_LO-1_PC-7_17_0
*Transverse Shear Stiffness
2250., 2250., 0.
** Region: (LAYUPLO-1-39: Generated From Layup), (Controls:EC-1)
*Elset, elset=LAYUPLO-1-39-23
 6274, 6275, 6276, 6277, 6278, 6279
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** Section: LAYUPLO-1-39
*Shell Section, elset=LAYUPLO-1-39-23, composite, orientation=Ori-MERGED_ORI-1-DISCORIENT, controls=EC-1, density=1.58e-09, layup=LAYUPLO-1
0.3, 3, ABQ_PLY_FABRIC_36, 45., PLY-1_LO-1_PC-7_276_0
0.3, 3, ABQ_PLY_FABRIC_36, 90., PLY-8_LO-1_PC-7_276_0
0.3, 3, ABQ_PLY_FABRIC_36, -45., PLY-9_LO-1_PC-7_276_0
0.3, 3, ABQ_PLY_FABRIC_36, 0., PLY-10_LO-1_PC-7_276_0
0.3, 3, ABQ_PLY_FABRIC_36, 0., PLY-11_LO-1_PC-7_276_0
0.3, 3, ABQ_PLY_FABRIC_36, -45., PLY-12_LO-1_PC-7_276_0
0.3, 3, ABQ_PLY_FABRIC_36, 90., PLY-13_LO-1_PC-7_276_0
0.3, 3, ABQ_PLY_FABRIC_36, 45., PLY-14_LO-1_PC-7_276_0
*Transverse Shear Stiffness
2250., 2250., 0.
** Region: (LAYUPLO-1-26: Generated From Layup), (Controls:Default)
*Elset, elset=LAYUPLO-1-26-24
 6413, 6633, 7283, 7323, 8085, 8123
** Section: LAYUPLO-1-26
*Shell Section, elset=LAYUPLO-1-26-24, composite, orientation=Ori-MERGED_ORI-1-DISCORIENT, density=1.58e-09, layup=LAYUPLO-1
0.3, 3, ABQ_PLY_FABRIC_8, 45., PLY-1_LO-1_PC-7_17_0
0.3, 3, ABQ_PLY_FABRIC_8, 90., PLY-8_LO-1_PC-7_17_0
0.3, 3, ABQ_PLY_FABRIC_8, -45., PLY-9_LO-1_PC-7_17_0
0.3, 3, ABQ_PLY_FABRIC_8, 0., PLY-10_LO-1_PC-7_17_0
0.3, 3, ABQ_PLY_FABRIC_8, 0., PLY-11_LO-1_PC-7_17_0
0.3, 3, ABQ_PLY_FABRIC_8, -45., PLY-12_LO-1_PC-7_17_0
0.3, 3, ABQ_PLY_FABRIC_8, 90., PLY-13_LO-1_PC-7_17_0
0.3, 3, ABQ_PLY_FABRIC_8, 45., PLY-14_LO-1_PC-7_17_0
*Transverse Shear Stiffness
2250., 2250., 0.
** Region: (LAYUPLO-1-39: Generated From Layup), (Controls:Default)
*Elset, elset=LAYUPLO-1-39-25
 6537, 6901
** Section: LAYUPLO-1-39
*Shell Section, elset=LAYUPLO-1-39-25, composite, orientation=Ori-MERGED_ORI-1-DISCORIENT, density=1.58e-09, layup=LAYUPLO-1
0.3, 3, ABQ_PLY_FABRIC_36, 45., PLY-1_LO-1_PC-7_276_0
0.3, 3, ABQ_PLY_FABRIC_36, 90., PLY-8_LO-1_PC-7_276_0
0.3, 3, ABQ_PLY_FABRIC_36, -45., PLY-9_LO-1_PC-7_276_0
0.3, 3, ABQ_PLY_FABRIC_36, 0., PLY-10_LO-1_PC-7_276_0
0.3, 3, ABQ_PLY_FABRIC_36, 0., PLY-11_LO-1_PC-7_276_0
0.3, 3, ABQ_PLY_FABRIC_36, -45., PLY-12_LO-1_PC-7_276_0
0.3, 3, ABQ_PLY_FABRIC_36, 90., PLY-13_LO-1_PC-7_276_0
0.3, 3, ABQ_PLY_FABRIC_36, 45., PLY-14_LO-1_PC-7_276_0
*Transverse Shear Stiffness
2250., 2250., 0.
** Region: (LAYUPLO-1-6: Generated From Layup), (Controls:EC-1)
*Elset, elset=LAYUPLO-1-6-26
 6982, 6983, 6984, 6985, 6986, 6987
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** Section: LAYUPLO-1-6
*Shell Section, elset=LAYUPLO-1-6-26, composite, orientation=Ori-MERGED_ORI-1-DISCORIENT, controls=EC-1, density=1.58e-09, layup=LAYUPLO-1
0.3, 3, ABQ_PLY_FABRIC_35, 45., PLY-1_LO-1_PC-7_224_0
0.3, 3, ABQ_PLY_FABRIC_35, 90., PLY-8_LO-1_PC-7_224_0
0.3, 3, ABQ_PLY_FABRIC_35, -45., PLY-9_LO-1_PC-7_224_0
0.3, 3, ABQ_PLY_FABRIC_35, 0., PLY-10_LO-1_PC-7_224_0
0.3, 3, ABQ_PLY_FABRIC_35, 0., PLY-11_LO-1_PC-7_224_0
0.3, 3, ABQ_PLY_FABRIC_35, -45., PLY-12_LO-1_PC-7_224_0
0.3, 3, ABQ_PLY_FABRIC_35, 90., PLY-13_LO-1_PC-7_224_0
0.3, 3, ABQ_PLY_FABRIC_35, 45., PLY-14_LO-1_PC-7_224_0
*Transverse Shear Stiffness
2250., 2250., 0.
** Region: (LAYUPLO-1-6: Generated From Layup), (Controls:Default)
*Elset, elset=LAYUPLO-1-6-27
 7061, 7243, 7401, 7573
** Section: LAYUPLO-1-6
*Shell Section, elset=LAYUPLO-1-6-27, composite, orientation=Ori-MERGED_ORI-1-DISCORIENT, density=1.58e-09, layup=LAYUPLO-1
0.3, 3, ABQ_PLY_FABRIC_35, 45., PLY-1_LO-1_PC-7_224_0
0.3, 3, ABQ_PLY_FABRIC_35, 90., PLY-8_LO-1_PC-7_224_0
0.3, 3, ABQ_PLY_FABRIC_35, -45., PLY-9_LO-1_PC-7_224_0
0.3, 3, ABQ_PLY_FABRIC_35, 0., PLY-10_LO-1_PC-7_224_0
0.3, 3, ABQ_PLY_FABRIC_35, 0., PLY-11_LO-1_PC-7_224_0
0.3, 3, ABQ_PLY_FABRIC_35, -45., PLY-12_LO-1_PC-7_224_0
0.3, 3, ABQ_PLY_FABRIC_35, 90., PLY-13_LO-1_PC-7_224_0
0.3, 3, ABQ_PLY_FABRIC_35, 45., PLY-14_LO-1_PC-7_224_0
*Transverse Shear Stiffness
2250., 2250., 0.
** Region: (LAYUPLO-1-7: Generated From Layup), (Controls:EC-1)
*Elset, elset=LAYUPLO-1-7-28
 7488, 7489, 7490, 7491, 7492, 7493
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** Section: LAYUPLO-1-7
*Shell Section, elset=LAYUPLO-1-7-28, composite, orientation=Ori-MERGED_ORI-1-DISCORIENT, controls=EC-1, density=1.58e-09, layup=LAYUPLO-1
0.3, 3, ABQ_PLY_FABRIC_34, 45., PLY-1_LO-1_PC-7_186_0
0.3, 3, ABQ_PLY_FABRIC_34, 90., PLY-8_LO-1_PC-7_186_0
0.3, 3, ABQ_PLY_FABRIC_34, -45., PLY-9_LO-1_PC-7_186_0
0.3, 3, ABQ_PLY_FABRIC_34, 0., PLY-10_LO-1_PC-7_186_0
0.3, 3, ABQ_PLY_FABRIC_34, 0., PLY-11_LO-1_PC-7_186_0
0.3, 3, ABQ_PLY_FABRIC_34, -45., PLY-12_LO-1_PC-7_186_0
0.3, 3, ABQ_PLY_FABRIC_34, 90., PLY-13_LO-1_PC-7_186_0
0.3, 3, ABQ_PLY_FABRIC_34, 45., PLY-14_LO-1_PC-7_186_0
*Transverse Shear Stiffness
2250., 2250., 0.
** Region: (LAYUPLO-1-7: Generated From Layup), (Controls:Default)
*Elset, elset=LAYUPLO-1-7-29
 7725, 7891
** Section: LAYUPLO-1-7
*Shell Section, elset=LAYUPLO-1-7-29, composite, orientation=Ori-MERGED_ORI-1-DISCORIENT, density=1.58e-09, layup=LAYUPLO-1
0.3, 3, ABQ_PLY_FABRIC_34, 45., PLY-1_LO-1_PC-7_186_0
0.3, 3, ABQ_PLY_FABRIC_34, 90., PLY-8_LO-1_PC-7_186_0
0.3, 3, ABQ_PLY_FABRIC_34, -45., PLY-9_LO-1_PC-7_186_0
0.3, 3, ABQ_PLY_FABRIC_34, 0., PLY-10_LO-1_PC-7_186_0
0.3, 3, ABQ_PLY_FABRIC_34, 0., PLY-11_LO-1_PC-7_186_0
0.3, 3, ABQ_PLY_FABRIC_34, -45., PLY-12_LO-1_PC-7_186_0
0.3, 3, ABQ_PLY_FABRIC_34, 90., PLY-13_LO-1_PC-7_186_0
0.3, 3, ABQ_PLY_FABRIC_34, 45., PLY-14_LO-1_PC-7_186_0
*Transverse Shear Stiffness
2250., 2250., 0.
** Region: (LAYUPLO-1-14: Generated From Layup), (Controls:EC-1)
*Elset, elset=LAYUPLO-1-14-30
 7968, 7969, 7970, 7971, 7972, 7973
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** Section: LAYUPLO-1-14
*Shell Section, elset=LAYUPLO-1-14-30, composite, orientation=Ori-MERGED_ORI-1-DISCORIENT, controls=EC-1, density=1.58e-09, layup=LAYUPLO-1
0.3, 3, ABQ_PLY_FABRIC_33, 45., PLY-1_LO-1_PC-7_157_0
0.3, 3, ABQ_PLY_FABRIC_33, 90., PLY-8_LO-1_PC-7_157_0
0.3, 3, ABQ_PLY_FABRIC_33, -45., PLY-9_LO-1_PC-7_157_0
0.3, 3, ABQ_PLY_FABRIC_33, 0., PLY-10_LO-1_PC-7_157_0
0.3, 3, ABQ_PLY_FABRIC_33, 0., PLY-11_LO-1_PC-7_157_0
0.3, 3, ABQ_PLY_FABRIC_33, -45., PLY-12_LO-1_PC-7_157_0
0.3, 3, ABQ_PLY_FABRIC_33, 90., PLY-13_LO-1_PC-7_157_0
0.3, 3, ABQ_PLY_FABRIC_33, 45., PLY-14_LO-1_PC-7_157_0
*Transverse Shear Stiffness
2250., 2250., 0.
** Region: (LAYUPLO-1-14: Generated From Layup), (Controls:Default)
*Elset, elset=LAYUPLO-1-14-31
 8041, 8201, 8345, 8495
** Section: LAYUPLO-1-14
*Shell Section, elset=LAYUPLO-1-14-31, composite, orientation=Ori-MERGED_ORI-1-DISCORIENT, density=1.58e-09, layup=LAYUPLO-1
0.3, 3, ABQ_PLY_FABRIC_33, 45., PLY-1_LO-1_PC-7_157_0
0.3, 3, ABQ_PLY_FABRIC_33, 90., PLY-8_LO-1_PC-7_157_0
0.3, 3, ABQ_PLY_FABRIC_33, -45., PLY-9_LO-1_PC-7_157_0
0.3, 3, ABQ_PLY_FABRIC_33, 0., PLY-10_LO-1_PC-7_157_0
0.3, 3, ABQ_PLY_FABRIC_33, 0., PLY-11_LO-1_PC-7_157_0
0.3, 3, ABQ_PLY_FABRIC_33, -45., PLY-12_LO-1_PC-7_157_0
0.3, 3, ABQ_PLY_FABRIC_33, 90., PLY-13_LO-1_PC-7_157_0
0.3, 3, ABQ_PLY_FABRIC_33, 45., PLY-14_LO-1_PC-7_157_0
*Transverse Shear Stiffness
2250., 2250., 0.
** Region: (LAYUPLO-1-8: Generated From Layup), (Controls:EC-1)
*Elset, elset=LAYUPLO-1-8-32
 8238, 8239, 8240, 8241, 8242, 8243
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** Section: LAYUPLO-1-8
*Shell Section, elset=LAYUPLO-1-8-32, composite, orientation=Ori-MERGED_ORI-1-DISCORIENT, controls=EC-1, density=1.58e-09, layup=LAYUPLO-1
0.3, 3, ABQ_PLY_FABRIC_7, 45., PLY-1_LO-1_PC-7_16_0
0.3, 3, ABQ_PLY_FABRIC_7, 90., PLY-8_LO-1_PC-7_16_0
0.3, 3, ABQ_PLY_FABRIC_7, -45., PLY-9_LO-1_PC-7_16_0
0.3, 3, ABQ_PLY_FABRIC_7, 0., PLY-10_LO-1_PC-7_16_0
0.3, 3, ABQ_PLY_FABRIC_7, 0., PLY-11_LO-1_PC-7_16_0
0.3, 3, ABQ_PLY_FABRIC_7, -45., PLY-12_LO-1_PC-7_16_0
0.3, 3, ABQ_PLY_FABRIC_7, 90., PLY-13_LO-1_PC-7_16_0
0.3, 3, ABQ_PLY_FABRIC_7, 45., PLY-14_LO-1_PC-7_16_0
*Transverse Shear Stiffness
2250., 2250., 0.
** Region: (LAYUPLO-1-15: Generated From Layup), (Controls:EC-1)
*Elset, elset=LAYUPLO-1-15-33
  8422,  8423,  8424,  8425,  8426,  8427
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** Section: LAYUPLO-1-15
*Shell Section, elset=LAYUPLO-1-15-33, composite, orientation=Ori-MERGED_ORI-1-DISCORIENT, controls=EC-1, density=1.58e-09, layup=LAYUPLO-1
0.3, 3, ABQ_PLY_FABRIC_32, 45., PLY-1_LO-1_PC-7_135_0
0.3, 3, ABQ_PLY_FABRIC_32, 90., PLY-8_LO-1_PC-7_135_0
0.3, 3, ABQ_PLY_FABRIC_32, -45., PLY-9_LO-1_PC-7_135_0
0.3, 3, ABQ_PLY_FABRIC_32, 0., PLY-10_LO-1_PC-7_135_0
0.3, 3, ABQ_PLY_FABRIC_32, 0., PLY-11_LO-1_PC-7_135_0
0.3, 3, ABQ_PLY_FABRIC_32, -45., PLY-12_LO-1_PC-7_135_0
0.3, 3, ABQ_PLY_FABRIC_32, 90., PLY-13_LO-1_PC-7_135_0
0.3, 3, ABQ_PLY_FABRIC_32, 45., PLY-14_LO-1_PC-7_135_0
*Transverse Shear Stiffness
2250., 2250., 0.
** Region: (LAYUPLO-1-15: Generated From Layup), (Controls:Default)
*Elset, elset=LAYUPLO-1-15-34
  8670, 11557
** Section: LAYUPLO-1-15
*Shell Section, elset=LAYUPLO-1-15-34, composite, orientation=Ori-MERGED_ORI-1-DISCORIENT, density=1.58e-09, layup=LAYUPLO-1
0.3, 3, ABQ_PLY_FABRIC_32, 45., PLY-1_LO-1_PC-7_135_0
0.3, 3, ABQ_PLY_FABRIC_32, 90., PLY-8_LO-1_PC-7_135_0
0.3, 3, ABQ_PLY_FABRIC_32, -45., PLY-9_LO-1_PC-7_135_0
0.3, 3, ABQ_PLY_FABRIC_32, 0., PLY-10_LO-1_PC-7_135_0
0.3, 3, ABQ_PLY_FABRIC_32, 0., PLY-11_LO-1_PC-7_135_0
0.3, 3, ABQ_PLY_FABRIC_32, -45., PLY-12_LO-1_PC-7_135_0
0.3, 3, ABQ_PLY_FABRIC_32, 90., PLY-13_LO-1_PC-7_135_0
0.3, 3, ABQ_PLY_FABRIC_32, 45., PLY-14_LO-1_PC-7_135_0
*Transverse Shear Stiffness
2250., 2250., 0.
** Region: (LAYUPLO-1-8: Generated From Layup), (Controls:Default)
*Elset, elset=LAYUPLO-1-8-35
 8793, 8902, 8966, 9242, 9461
** Section: LAYUPLO-1-8
*Shell Section, elset=LAYUPLO-1-8-35, composite, orientation=Ori-MERGED_ORI-1-DISCORIENT, density=1.58e-09, layup=LAYUPLO-1
0.3, 3, ABQ_PLY_FABRIC_7, 45., PLY-1_LO-1_PC-7_16_0
0.3, 3, ABQ_PLY_FABRIC_7, 90., PLY-8_LO-1_PC-7_16_0
0.3, 3, ABQ_PLY_FABRIC_7, -45., PLY-9_LO-1_PC-7_16_0
0.3, 3, ABQ_PLY_FABRIC_7, 0., PLY-10_LO-1_PC-7_16_0
0.3, 3, ABQ_PLY_FABRIC_7, 0., PLY-11_LO-1_PC-7_16_0
0.3, 3, ABQ_PLY_FABRIC_7, -45., PLY-12_LO-1_PC-7_16_0
0.3, 3, ABQ_PLY_FABRIC_7, 90., PLY-13_LO-1_PC-7_16_0
0.3, 3, ABQ_PLY_FABRIC_7, 45., PLY-14_LO-1_PC-7_16_0
*Transverse Shear Stiffness
2250., 2250., 0.
** Region: (LAYUPLO-1-9: Generated From Layup), (Controls:Default)
*Elset, elset=LAYUPLO-1-9-36
 8794, 9006, 9116, 9284, 9387, 9427, 9524, 9564, 9658, 9796
** Section: LAYUPLO-1-9
*Shell Section, elset=LAYUPLO-1-9-36, composite, orientation=Ori-MERGED_ORI-1-DISCORIENT, density=1.58e-09, layup=LAYUPLO-1
0.3, 3, ABQ_PLY_FABRIC_4, 45., PLY-1_LO-1_PC-7_13_0
0.3, 3, ABQ_PLY_FABRIC_4, 90., PLY-8_LO-1_PC-7_13_0
0.3, 3, ABQ_PLY_FABRIC_4, -45., PLY-9_LO-1_PC-7_13_0
0.3, 3, ABQ_PLY_FABRIC_4, 0., PLY-10_LO-1_PC-7_13_0
0.3, 3, ABQ_PLY_FABRIC_4, 0., PLY-11_LO-1_PC-7_13_0
0.3, 3, ABQ_PLY_FABRIC_4, -45., PLY-12_LO-1_PC-7_13_0
0.3, 3, ABQ_PLY_FABRIC_4, 90., PLY-13_LO-1_PC-7_13_0
0.3, 3, ABQ_PLY_FABRIC_4, 45., PLY-14_LO-1_PC-7_13_0
*Transverse Shear Stiffness
2250., 2250., 0.
** Region: (LAYUPLO-1-9: Generated From Layup), (Controls:EC-1)
*Elset, elset=LAYUPLO-1-9-37
 8795, 8830, 8831, 8967, 8968, 9003
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** Section: LAYUPLO-1-9
*Shell Section, elset=LAYUPLO-1-9-37, composite, orientation=Ori-MERGED_ORI-1-DISCORIENT, controls=EC-1, density=1.58e-09, layup=LAYUPLO-1
0.3, 3, ABQ_PLY_FABRIC_4, 45., PLY-1_LO-1_PC-7_13_0
0.3, 3, ABQ_PLY_FABRIC_4, 90., PLY-8_LO-1_PC-7_13_0
0.3, 3, ABQ_PLY_FABRIC_4, -45., PLY-9_LO-1_PC-7_13_0
0.3, 3, ABQ_PLY_FABRIC_4, 0., PLY-10_LO-1_PC-7_13_0
0.3, 3, ABQ_PLY_FABRIC_4, 0., PLY-11_LO-1_PC-7_13_0
0.3, 3, ABQ_PLY_FABRIC_4, -45., PLY-12_LO-1_PC-7_13_0
0.3, 3, ABQ_PLY_FABRIC_4, 90., PLY-13_LO-1_PC-7_13_0
0.3, 3, ABQ_PLY_FABRIC_4, 45., PLY-14_LO-1_PC-7_13_0
*Transverse Shear Stiffness
2250., 2250., 0.
** Region: (LAYUPLO-1-10: Generated From Layup), (Controls:EC-1)
*Elset, elset=LAYUPLO-1-10-38
 8903, 8904, 8905, 8906, 8907, 8908
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** Section: LAYUPLO-1-10
*Shell Section, elset=LAYUPLO-1-10-38, composite, orientation=Ori-MERGED_ORI-1-DISCORIENT, controls=EC-1, density=1.58e-09, layup=LAYUPLO-1
0.3, 3, ABQ_PLY_FABRIC_31, 45., PLY-1_LO-1_PC-7_117_0
0.3, 3, ABQ_PLY_FABRIC_31, 90., PLY-8_LO-1_PC-7_117_0
0.3, 3, ABQ_PLY_FABRIC_31, -45., PLY-9_LO-1_PC-7_117_0
0.3, 3, ABQ_PLY_FABRIC_31, 0., PLY-10_LO-1_PC-7_117_0
0.3, 3, ABQ_PLY_FABRIC_31, 0., PLY-11_LO-1_PC-7_117_0
0.3, 3, ABQ_PLY_FABRIC_31, -45., PLY-12_LO-1_PC-7_117_0
0.3, 3, ABQ_PLY_FABRIC_31, 90., PLY-13_LO-1_PC-7_117_0
0.3, 3, ABQ_PLY_FABRIC_31, 45., PLY-14_LO-1_PC-7_117_0
*Transverse Shear Stiffness
2250., 2250., 0.
** Region: (LAYUPLO-1-10: Generated From Layup), (Controls:Default)
*Elset, elset=LAYUPLO-1-10-39
 8936, 9002
** Section: LAYUPLO-1-10
*Shell Section, elset=LAYUPLO-1-10-39, composite, orientation=Ori-MERGED_ORI-1-DISCORIENT, density=1.58e-09, layup=LAYUPLO-1
0.3, 3, ABQ_PLY_FABRIC_31, 45., PLY-1_LO-1_PC-7_117_0
0.3, 3, ABQ_PLY_FABRIC_31, 90., PLY-8_LO-1_PC-7_117_0
0.3, 3, ABQ_PLY_FABRIC_31, -45., PLY-9_LO-1_PC-7_117_0
0.3, 3, ABQ_PLY_FABRIC_31, 0., PLY-10_LO-1_PC-7_117_0
0.3, 3, ABQ_PLY_FABRIC_31, 0., PLY-11_LO-1_PC-7_117_0
0.3, 3, ABQ_PLY_FABRIC_31, -45., PLY-12_LO-1_PC-7_117_0
0.3, 3, ABQ_PLY_FABRIC_31, 90., PLY-13_LO-1_PC-7_117_0
0.3, 3, ABQ_PLY_FABRIC_31, 45., PLY-14_LO-1_PC-7_117_0
*Transverse Shear Stiffness
2250., 2250., 0.
** Region: (LAYUPLO-1-16: Generated From Layup), (Controls:EC-1)
*Elset, elset=LAYUPLO-1-16
 9041, 9042, 9043, 9044, 9045, 9046
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** Section: LAYUPLO-1-16
*Shell Section, elset=LAYUPLO-1-16, composite, orientation=Ori-MERGED_ORI-1-DISCORIENT, controls=EC-1, density=1.58e-09, layup=LAYUPLO-1
0.3, 3, ABQ_PLY_FABRIC_30, 45., PLY-1_LO-1_PC-7_103_0
0.3, 3, ABQ_PLY_FABRIC_30, 90., PLY-8_LO-1_PC-7_103_0
0.3, 3, ABQ_PLY_FABRIC_30, -45., PLY-9_LO-1_PC-7_103_0
0.3, 3, ABQ_PLY_FABRIC_30, 0., PLY-10_LO-1_PC-7_103_0
0.3, 3, ABQ_PLY_FABRIC_30, 0., PLY-11_LO-1_PC-7_103_0
0.3, 3, ABQ_PLY_FABRIC_30, -45., PLY-12_LO-1_PC-7_103_0
0.3, 3, ABQ_PLY_FABRIC_30, 90., PLY-13_LO-1_PC-7_103_0
0.3, 3, ABQ_PLY_FABRIC_30, 45., PLY-14_LO-1_PC-7_103_0
*Transverse Shear Stiffness
2250., 2250., 0.
** Region: (LAYUPLO-1-11: Generated From Layup), (Controls:EC-1)
*Elset, elset=LAYUPLO-1-11-41
 9319, 9320, 9321, 9322, 9323, 9324
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** Section: LAYUPLO-1-11
*Shell Section, elset=LAYUPLO-1-11-41, composite, orientation=Ori-MERGED_ORI-1-DISCORIENT, controls=EC-1, density=1.58e-09, layup=LAYUPLO-1
0.3, 3, ABQ_PLY_FABRIC_29, 45., PLY-1_LO-1_PC-7_91_0
0.3, 3, ABQ_PLY_FABRIC_29, 90., PLY-8_LO-1_PC-7_91_0
0.3, 3, ABQ_PLY_FABRIC_29, -45., PLY-9_LO-1_PC-7_91_0
0.3, 3, ABQ_PLY_FABRIC_29, 0., PLY-10_LO-1_PC-7_91_0
0.3, 3, ABQ_PLY_FABRIC_29, 0., PLY-11_LO-1_PC-7_91_0
0.3, 3, ABQ_PLY_FABRIC_29, -45., PLY-12_LO-1_PC-7_91_0
0.3, 3, ABQ_PLY_FABRIC_29, 90., PLY-13_LO-1_PC-7_91_0
0.3, 3, ABQ_PLY_FABRIC_29, 45., PLY-14_LO-1_PC-7_91_0
*Transverse Shear Stiffness
2250., 2250., 0.
** Region: (LAYUPLO-1-11: Generated From Layup), (Controls:Default)
*Elset, elset=LAYUPLO-1-11-42
 9350, 9419
** Section: LAYUPLO-1-11
*Shell Section, elset=LAYUPLO-1-11-42, composite, orientation=Ori-MERGED_ORI-1-DISCORIENT, density=1.58e-09, layup=LAYUPLO-1
0.3, 3, ABQ_PLY_FABRIC_29, 45., PLY-1_LO-1_PC-7_91_0
0.3, 3, ABQ_PLY_FABRIC_29, 90., PLY-8_LO-1_PC-7_91_0
0.3, 3, ABQ_PLY_FABRIC_29, -45., PLY-9_LO-1_PC-7_91_0
0.3, 3, ABQ_PLY_FABRIC_29, 0., PLY-10_LO-1_PC-7_91_0
0.3, 3, ABQ_PLY_FABRIC_29, 0., PLY-11_LO-1_PC-7_91_0
0.3, 3, ABQ_PLY_FABRIC_29, -45., PLY-12_LO-1_PC-7_91_0
0.3, 3, ABQ_PLY_FABRIC_29, 90., PLY-13_LO-1_PC-7_91_0
0.3, 3, ABQ_PLY_FABRIC_29, 45., PLY-14_LO-1_PC-7_91_0
*Transverse Shear Stiffness
2250., 2250., 0.
** Region: (LAYUPLO-1-17: Generated From Layup), (Controls:EC-1)
*Elset, elset=LAYUPLO-1-17-43
  9492,  9493,  9494,  9495,  9496,  9497
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** Section: LAYUPLO-1-17
*Shell Section, elset=LAYUPLO-1-17-43, composite, orientation=Ori-MERGED_ORI-1-DISCORIENT, controls=EC-1, density=1.58e-09, layup=LAYUPLO-1
0.3, 3, ABQ_PLY_FABRIC_6, 45., PLY-1_LO-1_PC-7_15_0
0.3, 3, ABQ_PLY_FABRIC_6, 90., PLY-8_LO-1_PC-7_15_0
0.3, 3, ABQ_PLY_FABRIC_6, -45., PLY-9_LO-1_PC-7_15_0
0.3, 3, ABQ_PLY_FABRIC_6, 0., PLY-10_LO-1_PC-7_15_0
0.3, 3, ABQ_PLY_FABRIC_6, 0., PLY-11_LO-1_PC-7_15_0
0.3, 3, ABQ_PLY_FABRIC_6, -45., PLY-12_LO-1_PC-7_15_0
0.3, 3, ABQ_PLY_FABRIC_6, 90., PLY-13_LO-1_PC-7_15_0
0.3, 3, ABQ_PLY_FABRIC_6, 45., PLY-14_LO-1_PC-7_15_0
*Transverse Shear Stiffness
2250., 2250., 0.
** Region: (LAYUPLO-1-12: Generated From Layup), (Controls:EC-1)
*Elset, elset=LAYUPLO-1-12-44
 9597, 9598, 9599, 9600, 9601, 9602
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** Section: LAYUPLO-1-12
*Shell Section, elset=LAYUPLO-1-12-44, composite, orientation=Ori-MERGED_ORI-1-DISCORIENT, controls=EC-1, density=1.58e-09, layup=LAYUPLO-1
0.3, 3, ABQ_PLY_FABRIC_28, 45., PLY-1_LO-1_PC-7_81_0
0.3, 3, ABQ_PLY_FABRIC_28, 90., PLY-8_LO-1_PC-7_81_0
0.3, 3, ABQ_PLY_FABRIC_28, -45., PLY-9_LO-1_PC-7_81_0
0.3, 3, ABQ_PLY_FABRIC_28, 0., PLY-10_LO-1_PC-7_81_0
0.3, 3, ABQ_PLY_FABRIC_28, 0., PLY-11_LO-1_PC-7_81_0
0.3, 3, ABQ_PLY_FABRIC_28, -45., PLY-12_LO-1_PC-7_81_0
0.3, 3, ABQ_PLY_FABRIC_28, 90., PLY-13_LO-1_PC-7_81_0
0.3, 3, ABQ_PLY_FABRIC_28, 45., PLY-14_LO-1_PC-7_81_0
*Transverse Shear Stiffness
2250., 2250., 0.
** Region: (LAYUPLO-1-12: Generated From Layup), (Controls:Default)
*Elset, elset=LAYUPLO-1-12-45
 9626, 9688
** Section: LAYUPLO-1-12
*Shell Section, elset=LAYUPLO-1-12-45, composite, orientation=Ori-MERGED_ORI-1-DISCORIENT, density=1.58e-09, layup=LAYUPLO-1
0.3, 3, ABQ_PLY_FABRIC_28, 45., PLY-1_LO-1_PC-7_81_0
0.3, 3, ABQ_PLY_FABRIC_28, 90., PLY-8_LO-1_PC-7_81_0
0.3, 3, ABQ_PLY_FABRIC_28, -45., PLY-9_LO-1_PC-7_81_0
0.3, 3, ABQ_PLY_FABRIC_28, 0., PLY-10_LO-1_PC-7_81_0
0.3, 3, ABQ_PLY_FABRIC_28, 0., PLY-11_LO-1_PC-7_81_0
0.3, 3, ABQ_PLY_FABRIC_28, -45., PLY-12_LO-1_PC-7_81_0
0.3, 3, ABQ_PLY_FABRIC_28, 90., PLY-13_LO-1_PC-7_81_0
0.3, 3, ABQ_PLY_FABRIC_28, 45., PLY-14_LO-1_PC-7_81_0
*Transverse Shear Stiffness
2250., 2250., 0.
** Region: (LAYUPLO-1-17: Generated From Layup), (Controls:Default)
*Elset, elset=LAYUPLO-1-17-46
  9648,  9761,  9929, 10075, 10373
** Section: LAYUPLO-1-17
*Shell Section, elset=LAYUPLO-1-17-46, composite, orientation=Ori-MERGED_ORI-1-DISCORIENT, density=1.58e-09, layup=LAYUPLO-1
0.3, 3, ABQ_PLY_FABRIC_6, 45., PLY-1_LO-1_PC-7_15_0
0.3, 3, ABQ_PLY_FABRIC_6, 90., PLY-8_LO-1_PC-7_15_0
0.3, 3, ABQ_PLY_FABRIC_6, -45., PLY-9_LO-1_PC-7_15_0
0.3, 3, ABQ_PLY_FABRIC_6, 0., PLY-10_LO-1_PC-7_15_0
0.3, 3, ABQ_PLY_FABRIC_6, 0., PLY-11_LO-1_PC-7_15_0
0.3, 3, ABQ_PLY_FABRIC_6, -45., PLY-12_LO-1_PC-7_15_0
0.3, 3, ABQ_PLY_FABRIC_6, 90., PLY-13_LO-1_PC-7_15_0
0.3, 3, ABQ_PLY_FABRIC_6, 45., PLY-14_LO-1_PC-7_15_0
*Transverse Shear Stiffness
2250., 2250., 0.
** Region: (LAYUPLO-1-13: Generated From Layup), (Controls:EC-1)
*Elset, elset=LAYUPLO-1-13-47
  9689,  9690,  9691,  9692,  9693,  9694
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** Section: LAYUPLO-1-13
*Shell Section, elset=LAYUPLO-1-13-47, composite, orientation=Ori-MERGED_ORI-1-DISCORIENT, controls=EC-1, density=1.58e-09, layup=LAYUPLO-1
0.3, 3, ABQ_PLY_FABRIC_5, 45., PLY-1_LO-1_PC-7_14_0
0.3, 3, ABQ_PLY_FABRIC_5, 90., PLY-8_LO-1_PC-7_14_0
0.3, 3, ABQ_PLY_FABRIC_5, -45., PLY-9_LO-1_PC-7_14_0
0.3, 3, ABQ_PLY_FABRIC_5, 0., PLY-10_LO-1_PC-7_14_0
0.3, 3, ABQ_PLY_FABRIC_5, 0., PLY-11_LO-1_PC-7_14_0
0.3, 3, ABQ_PLY_FABRIC_5, -45., PLY-12_LO-1_PC-7_14_0
0.3, 3, ABQ_PLY_FABRIC_5, 90., PLY-13_LO-1_PC-7_14_0
0.3, 3, ABQ_PLY_FABRIC_5, 45., PLY-14_LO-1_PC-7_14_0
*Transverse Shear Stiffness
2250., 2250., 0.
** Region: (LAYUPLO-1-13: Generated From Layup), (Controls:Default)
*Elset, elset=LAYUPLO-1-13-48
  9700,  9809, 10505, 10865, 11155, 11556
** Section: LAYUPLO-1-13
*Shell Section, elset=LAYUPLO-1-13-48, composite, orientation=Ori-MERGED_ORI-1-DISCORIENT, density=1.58e-09, layup=LAYUPLO-1
0.3, 3, ABQ_PLY_FABRIC_5, 45., PLY-1_LO-1_PC-7_14_0
0.3, 3, ABQ_PLY_FABRIC_5, 90., PLY-8_LO-1_PC-7_14_0
0.3, 3, ABQ_PLY_FABRIC_5, -45., PLY-9_LO-1_PC-7_14_0
0.3, 3, ABQ_PLY_FABRIC_5, 0., PLY-10_LO-1_PC-7_14_0
0.3, 3, ABQ_PLY_FABRIC_5, 0., PLY-11_LO-1_PC-7_14_0
0.3, 3, ABQ_PLY_FABRIC_5, -45., PLY-12_LO-1_PC-7_14_0
0.3, 3, ABQ_PLY_FABRIC_5, 90., PLY-13_LO-1_PC-7_14_0
0.3, 3, ABQ_PLY_FABRIC_5, 45., PLY-14_LO-1_PC-7_14_0
*Transverse Shear Stiffness
2250., 2250., 0.
** Region: (LAYUPLO-1-18: Generated From Layup), (Controls:EC-1)
*Elset, elset=LAYUPLO-1-18
 9733, 9734, 9735, 9736, 9737, 9738
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** Section: LAYUPLO-1-18
*Shell Section, elset=LAYUPLO-1-18, composite, orientation=Ori-MERGED_ORI-1-DISCORIENT, controls=EC-1, density=1.58e-09, layup=LAYUPLO-1
0.3, 3, ABQ_PLY_FABRIC_27, 45., PLY-1_LO-1_PC-7_73_0
0.3, 3, ABQ_PLY_FABRIC_27, 90., PLY-8_LO-1_PC-7_73_0
0.3, 3, ABQ_PLY_FABRIC_27, -45., PLY-9_LO-1_PC-7_73_0
0.3, 3, ABQ_PLY_FABRIC_27, 0., PLY-10_LO-1_PC-7_73_0
0.3, 3, ABQ_PLY_FABRIC_27, 0., PLY-11_LO-1_PC-7_73_0
0.3, 3, ABQ_PLY_FABRIC_27, -45., PLY-12_LO-1_PC-7_73_0
0.3, 3, ABQ_PLY_FABRIC_27, 90., PLY-13_LO-1_PC-7_73_0
0.3, 3, ABQ_PLY_FABRIC_27, 45., PLY-14_LO-1_PC-7_73_0
*Transverse Shear Stiffness
2250., 2250., 0.
** Region: (LAYUPLO-1-27: Generated From Layup), (Controls:EC-1)
*Elset, elset=LAYUPLO-1-27-50
  9842,  9843,  9844,  9845,  9846,  9847
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** Section: LAYUPLO-1-27
*Shell Section, elset=LAYUPLO-1-27-50, composite, orientation=Ori-MERGED_ORI-1-DISCORIENT, controls=EC-1, density=1.58e-09, layup=LAYUPLO-1
0.3, 3, ABQ_PLY_FABRIC_26, 45., PLY-1_LO-1_PC-7_66_0
0.3, 3, ABQ_PLY_FABRIC_26, 90., PLY-8_LO-1_PC-7_66_0
0.3, 3, ABQ_PLY_FABRIC_26, -45., PLY-9_LO-1_PC-7_66_0
0.3, 3, ABQ_PLY_FABRIC_26, 0., PLY-10_LO-1_PC-7_66_0
0.3, 3, ABQ_PLY_FABRIC_26, 0., PLY-11_LO-1_PC-7_66_0
0.3, 3, ABQ_PLY_FABRIC_26, -45., PLY-12_LO-1_PC-7_66_0
0.3, 3, ABQ_PLY_FABRIC_26, 90., PLY-13_LO-1_PC-7_66_0
0.3, 3, ABQ_PLY_FABRIC_26, 45., PLY-14_LO-1_PC-7_66_0
*Transverse Shear Stiffness
2250., 2250., 0.
** Region: (LAYUPLO-1-27: Generated From Layup), (Controls:Default)
*Elset, elset=LAYUPLO-1-27-51
 9869, 9897
** Section: LAYUPLO-1-27
*Shell Section, elset=LAYUPLO-1-27-51, composite, orientation=Ori-MERGED_ORI-1-DISCORIENT, density=1.58e-09, layup=LAYUPLO-1
0.3, 3, ABQ_PLY_FABRIC_26, 45., PLY-1_LO-1_PC-7_66_0
0.3, 3, ABQ_PLY_FABRIC_26, 90., PLY-8_LO-1_PC-7_66_0
0.3, 3, ABQ_PLY_FABRIC_26, -45., PLY-9_LO-1_PC-7_66_0
0.3, 3, ABQ_PLY_FABRIC_26, 0., PLY-10_LO-1_PC-7_66_0
0.3, 3, ABQ_PLY_FABRIC_26, 0., PLY-11_LO-1_PC-7_66_0
0.3, 3, ABQ_PLY_FABRIC_26, -45., PLY-12_LO-1_PC-7_66_0
0.3, 3, ABQ_PLY_FABRIC_26, 90., PLY-13_LO-1_PC-7_66_0
0.3, 3, ABQ_PLY_FABRIC_26, 45., PLY-14_LO-1_PC-7_66_0
*Transverse Shear Stiffness
2250., 2250., 0.
** Region: (LAYUPLO-1-40: Generated From Layup), (Controls:EC-1)
*Elset, elset=LAYUPLO-1-40-52
 10076, 10077, 10078, 10079, 10080, 10081
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** Section: LAYUPLO-1-40
*Shell Section, elset=LAYUPLO-1-40-52, composite, orientation=Ori-MERGED_ORI-1-DISCORIENT, controls=EC-1, density=1.58e-09, layup=LAYUPLO-1
0.3, 3, ABQ_PLY_FABRIC_25, 45., PLY-1_LO-1_PC-7_60_0
0.3, 3, ABQ_PLY_FABRIC_25, 90., PLY-8_LO-1_PC-7_60_0
0.3, 3, ABQ_PLY_FABRIC_25, -45., PLY-9_LO-1_PC-7_60_0
0.3, 3, ABQ_PLY_FABRIC_25, 0., PLY-10_LO-1_PC-7_60_0
0.3, 3, ABQ_PLY_FABRIC_25, 0., PLY-11_LO-1_PC-7_60_0
0.3, 3, ABQ_PLY_FABRIC_25, -45., PLY-12_LO-1_PC-7_60_0
0.3, 3, ABQ_PLY_FABRIC_25, 90., PLY-13_LO-1_PC-7_60_0
0.3, 3, ABQ_PLY_FABRIC_25, 45., PLY-14_LO-1_PC-7_60_0
*Transverse Shear Stiffness
2250., 2250., 0.
** Region: (LAYUPLO-1-40: Generated From Layup), (Controls:Default)
*Elset, elset=LAYUPLO-1-40-53
 10101, 10127
** Section: LAYUPLO-1-40
*Shell Section, elset=LAYUPLO-1-40-53, composite, orientation=Ori-MERGED_ORI-1-DISCORIENT, density=1.58e-09, layup=LAYUPLO-1
0.3, 3, ABQ_PLY_FABRIC_25, 45., PLY-1_LO-1_PC-7_60_0
0.3, 3, ABQ_PLY_FABRIC_25, 90., PLY-8_LO-1_PC-7_60_0
0.3, 3, ABQ_PLY_FABRIC_25, -45., PLY-9_LO-1_PC-7_60_0
0.3, 3, ABQ_PLY_FABRIC_25, 0., PLY-10_LO-1_PC-7_60_0
0.3, 3, ABQ_PLY_FABRIC_25, 0., PLY-11_LO-1_PC-7_60_0
0.3, 3, ABQ_PLY_FABRIC_25, -45., PLY-12_LO-1_PC-7_60_0
0.3, 3, ABQ_PLY_FABRIC_25, 90., PLY-13_LO-1_PC-7_60_0
0.3, 3, ABQ_PLY_FABRIC_25, 45., PLY-14_LO-1_PC-7_60_0
*Transverse Shear Stiffness
2250., 2250., 0.
** Region: (LAYUPLO-1-28: Generated From Layup), (Controls:EC-1)
*Elset, elset=LAYUPLO-1-28, generate
 10188,  10235,      1
** Section: LAYUPLO-1-28
*Shell Section, elset=LAYUPLO-1-28, composite, orientation=Ori-MERGED_ORI-1-DISCORIENT, controls=EC-1, density=1.58e-09, layup=LAYUPLO-1
0.3, 3, ABQ_PLY_FABRIC_24, 45., PLY-1_LO-1_PC-7_55_0
0.3, 3, ABQ_PLY_FABRIC_24, 90., PLY-8_LO-1_PC-7_55_0
0.3, 3, ABQ_PLY_FABRIC_24, -45., PLY-9_LO-1_PC-7_55_0
0.3, 3, ABQ_PLY_FABRIC_24, 0., PLY-10_LO-1_PC-7_55_0
0.3, 3, ABQ_PLY_FABRIC_24, 0., PLY-11_LO-1_PC-7_55_0
0.3, 3, ABQ_PLY_FABRIC_24, -45., PLY-12_LO-1_PC-7_55_0
0.3, 3, ABQ_PLY_FABRIC_24, 90., PLY-13_LO-1_PC-7_55_0
0.3, 3, ABQ_PLY_FABRIC_24, 45., PLY-14_LO-1_PC-7_55_0
*Transverse Shear Stiffness
2250., 2250., 0.
** Region: (LAYUPLO-1-29: Generated From Layup), (Controls:EC-1)
*Elset, elset=LAYUPLO-1-29-55
 10296, 10297, 10298, 10299, 10300, 10301
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** Section: LAYUPLO-1-29
*Shell Section, elset=LAYUPLO-1-29-55, composite, orientation=Ori-MERGED_ORI-1-DISCORIENT, controls=EC-1, density=1.58e-09, layup=LAYUPLO-1
0.3, 3, ABQ_PLY_FABRIC_23, 45., PLY-1_LO-1_PC-7_50_0
0.3, 3, ABQ_PLY_FABRIC_23, 90., PLY-8_LO-1_PC-7_50_0
0.3, 3, ABQ_PLY_FABRIC_23, -45., PLY-9_LO-1_PC-7_50_0
0.3, 3, ABQ_PLY_FABRIC_23, 0., PLY-10_LO-1_PC-7_50_0
0.3, 3, ABQ_PLY_FABRIC_23, 0., PLY-11_LO-1_PC-7_50_0
0.3, 3, ABQ_PLY_FABRIC_23, -45., PLY-12_LO-1_PC-7_50_0
0.3, 3, ABQ_PLY_FABRIC_23, 90., PLY-13_LO-1_PC-7_50_0
0.3, 3, ABQ_PLY_FABRIC_23, 45., PLY-14_LO-1_PC-7_50_0
*Transverse Shear Stiffness
2250., 2250., 0.
** Region: (LAYUPLO-1-29: Generated From Layup), (Controls:Default)
*Elset, elset=LAYUPLO-1-29-56
 10319, 10343
** Section: LAYUPLO-1-29
*Shell Section, elset=LAYUPLO-1-29-56, composite, orientation=Ori-MERGED_ORI-1-DISCORIENT, density=1.58e-09, layup=LAYUPLO-1
0.3, 3, ABQ_PLY_FABRIC_23, 45., PLY-1_LO-1_PC-7_50_0
0.3, 3, ABQ_PLY_FABRIC_23, 90., PLY-8_LO-1_PC-7_50_0
0.3, 3, ABQ_PLY_FABRIC_23, -45., PLY-9_LO-1_PC-7_50_0
0.3, 3, ABQ_PLY_FABRIC_23, 0., PLY-10_LO-1_PC-7_50_0
0.3, 3, ABQ_PLY_FABRIC_23, 0., PLY-11_LO-1_PC-7_50_0
0.3, 3, ABQ_PLY_FABRIC_23, -45., PLY-12_LO-1_PC-7_50_0
0.3, 3, ABQ_PLY_FABRIC_23, 90., PLY-13_LO-1_PC-7_50_0
0.3, 3, ABQ_PLY_FABRIC_23, 45., PLY-14_LO-1_PC-7_50_0
*Transverse Shear Stiffness
2250., 2250., 0.
** Region: (LAYUPLO-1-41: Generated From Layup), (Controls:EC-1)
*Elset, elset=LAYUPLO-1-41, generate
 10404,  10447,      1
** Section: LAYUPLO-1-41
*Shell Section, elset=LAYUPLO-1-41, composite, orientation=Ori-MERGED_ORI-1-DISCORIENT, controls=EC-1, density=1.58e-09, layup=LAYUPLO-1
0.3, 3, ABQ_PLY_FABRIC_22, 45., PLY-1_LO-1_PC-7_46_0
0.3, 3, ABQ_PLY_FABRIC_22, 90., PLY-8_LO-1_PC-7_46_0
0.3, 3, ABQ_PLY_FABRIC_22, -45., PLY-9_LO-1_PC-7_46_0
0.3, 3, ABQ_PLY_FABRIC_22, 0., PLY-10_LO-1_PC-7_46_0
0.3, 3, ABQ_PLY_FABRIC_22, 0., PLY-11_LO-1_PC-7_46_0
0.3, 3, ABQ_PLY_FABRIC_22, -45., PLY-12_LO-1_PC-7_46_0
0.3, 3, ABQ_PLY_FABRIC_22, 90., PLY-13_LO-1_PC-7_46_0
0.3, 3, ABQ_PLY_FABRIC_22, 45., PLY-14_LO-1_PC-7_46_0
*Transverse Shear Stiffness
2250., 2250., 0.
** Region: (LAYUPLO-1-30: Generated From Layup), (Controls:EC-1)
*Elset, elset=LAYUPLO-1-30-58
 10506, 10507, 10508, 10509, 10510, 10511
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** Section: LAYUPLO-1-30
*Shell Section, elset=LAYUPLO-1-30-58, composite, orientation=Ori-MERGED_ORI-1-DISCORIENT, controls=EC-1, density=1.58e-09, layup=LAYUPLO-1
0.3, 3, ABQ_PLY_FABRIC_21, 45., PLY-1_LO-1_PC-7_42_0
0.3, 3, ABQ_PLY_FABRIC_21, 90., PLY-8_LO-1_PC-7_42_0
0.3, 3, ABQ_PLY_FABRIC_21, -45., PLY-9_LO-1_PC-7_42_0
0.3, 3, ABQ_PLY_FABRIC_21, 0., PLY-10_LO-1_PC-7_42_0
0.3, 3, ABQ_PLY_FABRIC_21, 0., PLY-11_LO-1_PC-7_42_0
0.3, 3, ABQ_PLY_FABRIC_21, -45., PLY-12_LO-1_PC-7_42_0
0.3, 3, ABQ_PLY_FABRIC_21, 90., PLY-13_LO-1_PC-7_42_0
0.3, 3, ABQ_PLY_FABRIC_21, 45., PLY-14_LO-1_PC-7_42_0
*Transverse Shear Stiffness
2250., 2250., 0.
** Region: (LAYUPLO-1-30: Generated From Layup), (Controls:Default)
*Elset, elset=LAYUPLO-1-30-59
 10527, 10549
** Section: LAYUPLO-1-30
*Shell Section, elset=LAYUPLO-1-30-59, composite, orientation=Ori-MERGED_ORI-1-DISCORIENT, density=1.58e-09, layup=LAYUPLO-1
0.3, 3, ABQ_PLY_FABRIC_21, 45., PLY-1_LO-1_PC-7_42_0
0.3, 3, ABQ_PLY_FABRIC_21, 90., PLY-8_LO-1_PC-7_42_0
0.3, 3, ABQ_PLY_FABRIC_21, -45., PLY-9_LO-1_PC-7_42_0
0.3, 3, ABQ_PLY_FABRIC_21, 0., PLY-10_LO-1_PC-7_42_0
0.3, 3, ABQ_PLY_FABRIC_21, 0., PLY-11_LO-1_PC-7_42_0
0.3, 3, ABQ_PLY_FABRIC_21, -45., PLY-12_LO-1_PC-7_42_0
0.3, 3, ABQ_PLY_FABRIC_21, 90., PLY-13_LO-1_PC-7_42_0
0.3, 3, ABQ_PLY_FABRIC_21, 45., PLY-14_LO-1_PC-7_42_0
*Transverse Shear Stiffness
2250., 2250., 0.
** Region: (LAYUPLO-1-42: Generated From Layup), (Controls:EC-1)
*Elset, elset=LAYUPLO-1-42, generate
 10606,  10625,      1
** Section: LAYUPLO-1-42
*Shell Section, elset=LAYUPLO-1-42, composite, orientation=Ori-MERGED_ORI-1-DISCORIENT, controls=EC-1, density=1.58e-09, layup=LAYUPLO-1
0.3, 3, ABQ_PLY_FABRIC_20, 45., PLY-1_LO-1_PC-7_39_0
0.3, 3, ABQ_PLY_FABRIC_20, 90., PLY-8_LO-1_PC-7_39_0
0.3, 3, ABQ_PLY_FABRIC_20, -45., PLY-9_LO-1_PC-7_39_0
0.3, 3, ABQ_PLY_FABRIC_20, 0., PLY-10_LO-1_PC-7_39_0
0.3, 3, ABQ_PLY_FABRIC_20, 0., PLY-11_LO-1_PC-7_39_0
0.3, 3, ABQ_PLY_FABRIC_20, -45., PLY-12_LO-1_PC-7_39_0
0.3, 3, ABQ_PLY_FABRIC_20, 90., PLY-13_LO-1_PC-7_39_0
0.3, 3, ABQ_PLY_FABRIC_20, 45., PLY-14_LO-1_PC-7_39_0
*Transverse Shear Stiffness
2250., 2250., 0.
** Region: (LAYUPLO-1-31: Generated From Layup), (Controls:EC-1)
*Elset, elset=LAYUPLO-1-31, generate
 10626,  10645,      1
** Section: LAYUPLO-1-31
*Shell Section, elset=LAYUPLO-1-31, composite, orientation=Ori-MERGED_ORI-1-DISCORIENT, controls=EC-1, density=1.58e-09, layup=LAYUPLO-1
0.3, 3, ABQ_PLY_FABRIC_19, 45., PLY-1_LO-1_PC-7_36_0
0.3, 3, ABQ_PLY_FABRIC_19, 90., PLY-8_LO-1_PC-7_36_0
0.3, 3, ABQ_PLY_FABRIC_19, -45., PLY-9_LO-1_PC-7_36_0
0.3, 3, ABQ_PLY_FABRIC_19, 0., PLY-10_LO-1_PC-7_36_0
0.3, 3, ABQ_PLY_FABRIC_19, 0., PLY-11_LO-1_PC-7_36_0
0.3, 3, ABQ_PLY_FABRIC_19, -45., PLY-12_LO-1_PC-7_36_0
0.3, 3, ABQ_PLY_FABRIC_19, 90., PLY-13_LO-1_PC-7_36_0
0.3, 3, ABQ_PLY_FABRIC_19, 45., PLY-14_LO-1_PC-7_36_0
*Transverse Shear Stiffness
2250., 2250., 0.
** Region: (LAYUPLO-1-32: Generated From Layup), (Controls:EC-1)
*Elset, elset=LAYUPLO-1-32, generate
 10702,  10741,      1
** Section: LAYUPLO-1-32
*Shell Section, elset=LAYUPLO-1-32, composite, orientation=Ori-MERGED_ORI-1-DISCORIENT, controls=EC-1, density=1.58e-09, layup=LAYUPLO-1
0.3, 3, ABQ_PLY_FABRIC_18, 45., PLY-1_LO-1_PC-7_33_0
0.3, 3, ABQ_PLY_FABRIC_18, 90., PLY-8_LO-1_PC-7_33_0
0.3, 3, ABQ_PLY_FABRIC_18, -45., PLY-9_LO-1_PC-7_33_0
0.3, 3, ABQ_PLY_FABRIC_18, 0., PLY-10_LO-1_PC-7_33_0
0.3, 3, ABQ_PLY_FABRIC_18, 0., PLY-11_LO-1_PC-7_33_0
0.3, 3, ABQ_PLY_FABRIC_18, -45., PLY-12_LO-1_PC-7_33_0
0.3, 3, ABQ_PLY_FABRIC_18, 90., PLY-13_LO-1_PC-7_33_0
0.3, 3, ABQ_PLY_FABRIC_18, 45., PLY-14_LO-1_PC-7_33_0
*Transverse Shear Stiffness
2250., 2250., 0.
** Region: (LAYUPLO-1-43: Generated From Layup), (Controls:EC-1)
*Elset, elset=LAYUPLO-1-43-63
 10798, 10799, 10800, 10801, 10802, 10803
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** Section: LAYUPLO-1-43
*Shell Section, elset=LAYUPLO-1-43-63, composite, orientation=Ori-MERGED_ORI-1-DISCORIENT, controls=EC-1, density=1.58e-09, layup=LAYUPLO-1
0.3, 3, ABQ_PLY_FABRIC_17, 45., PLY-1_LO-1_PC-7_31_0
0.3, 3, ABQ_PLY_FABRIC_17, 90., PLY-8_LO-1_PC-7_31_0
0.3, 3, ABQ_PLY_FABRIC_17, -45., PLY-9_LO-1_PC-7_31_0
0.3, 3, ABQ_PLY_FABRIC_17, 0., PLY-10_LO-1_PC-7_31_0
0.3, 3, ABQ_PLY_FABRIC_17, 0., PLY-11_LO-1_PC-7_31_0
0.3, 3, ABQ_PLY_FABRIC_17, -45., PLY-12_LO-1_PC-7_31_0
0.3, 3, ABQ_PLY_FABRIC_17, 90., PLY-13_LO-1_PC-7_31_0
0.3, 3, ABQ_PLY_FABRIC_17, 45., PLY-14_LO-1_PC-7_31_0
*Transverse Shear Stiffness
2250., 2250., 0.
** Region: (LAYUPLO-1-43: Generated From Layup), (Controls:Default)
*Elset, elset=LAYUPLO-1-43-64
 10817, 10837
** Section: LAYUPLO-1-43
*Shell Section, elset=LAYUPLO-1-43-64, composite, orientation=Ori-MERGED_ORI-1-DISCORIENT, density=1.58e-09, layup=LAYUPLO-1
0.3, 3, ABQ_PLY_FABRIC_17, 45., PLY-1_LO-1_PC-7_31_0
0.3, 3, ABQ_PLY_FABRIC_17, 90., PLY-8_LO-1_PC-7_31_0
0.3, 3, ABQ_PLY_FABRIC_17, -45., PLY-9_LO-1_PC-7_31_0
0.3, 3, ABQ_PLY_FABRIC_17, 0., PLY-10_LO-1_PC-7_31_0
0.3, 3, ABQ_PLY_FABRIC_17, 0., PLY-11_LO-1_PC-7_31_0
0.3, 3, ABQ_PLY_FABRIC_17, -45., PLY-12_LO-1_PC-7_31_0
0.3, 3, ABQ_PLY_FABRIC_17, 90., PLY-13_LO-1_PC-7_31_0
0.3, 3, ABQ_PLY_FABRIC_17, 45., PLY-14_LO-1_PC-7_31_0
*Transverse Shear Stiffness
2250., 2250., 0.
** Region: (LAYUPLO-1-33: Generated From Layup), (Controls:EC-1)
*Elset, elset=LAYUPLO-1-33-1
 10894, 10895, 10896, 10897, 10898, 10899
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** Section: LAYUPLO-1-33
*Shell Section, elset=LAYUPLO-1-33-1, composite, orientation=Ori-MERGED_ORI-1-DISCORIENT, controls=EC-1, density=1.58e-09, layup=LAYUPLO-1
0.3, 3, ABQ_PLY_FABRIC_15, 45., PLY-1_LO-1_PC-7_27_0
0.3, 3, ABQ_PLY_FABRIC_15, 90., PLY-8_LO-1_PC-7_27_0
0.3, 3, ABQ_PLY_FABRIC_15, -45., PLY-9_LO-1_PC-7_27_0
0.3, 3, ABQ_PLY_FABRIC_15, 0., PLY-10_LO-1_PC-7_27_0
0.3, 3, ABQ_PLY_FABRIC_15, 0., PLY-11_LO-1_PC-7_27_0
0.3, 3, ABQ_PLY_FABRIC_15, -45., PLY-12_LO-1_PC-7_27_0
0.3, 3, ABQ_PLY_FABRIC_15, 90., PLY-13_LO-1_PC-7_27_0
0.3, 3, ABQ_PLY_FABRIC_15, 45., PLY-14_LO-1_PC-7_27_0
*Transverse Shear Stiffness
2250., 2250., 0.
*Orientation, name=Ori-MERGED_ORI-44-DISCORIENT, system=RECTANGULAR
MERGED_ORI-44-DISCORIENT
3, 0.
** Region: (LAYUPLO-2-1: Generated From Layup), (Controls:EC-1)
*Elset, elset=LAYUPLO-2-1-66-1
 11901, 11902, 11903, 11904, 11905, 11906
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** Section: LAYUPLO-2-1
*Shell Section, elset=LAYUPLO-2-1-66-1, composite, orientation=Ori-MERGED_ORI-44-DISCORIENT, controls=EC-1, density=1.58e-09, layup=LAYUPLO-2
0.3, 3, ABQ_PLY_FABRIC_41, -45., PLY-9_LO-2_PC-1_1000_0
0.3, 3, ABQ_PLY_FABRIC_41, 0., PLY-10_LO-2_PC-1_1000_0
0.3, 3, ABQ_PLY_FABRIC_41, 0., PLY-11_LO-2_PC-1_1000_0
0.3, 3, ABQ_PLY_FABRIC_41, -45., PLY-12_LO-2_PC-1_1000_0
*Transverse Shear Stiffness
2250., 2250., 0.
** Region: (LAYUPLO-2-1: Generated From Layup), (Controls:Default)
*Elset, elset=LAYUPLO-2-1-67-1
 12860, 13130, 13298, 13427, 13475, 13497, 13517, 13535, 13551, 13573, 13574, 13575, 13576
** Section: LAYUPLO-2-1
*Shell Section, elset=LAYUPLO-2-1-67-1, composite, orientation=Ori-MERGED_ORI-44-DISCORIENT, density=1.58e-09, layup=LAYUPLO-2
0.3, 3, ABQ_PLY_FABRIC_41, -45., PLY-9_LO-2_PC-1_1000_0
0.3, 3, ABQ_PLY_FABRIC_41, 0., PLY-10_LO-2_PC-1_1000_0
0.3, 3, ABQ_PLY_FABRIC_41, 0., PLY-11_LO-2_PC-1_1000_0
0.3, 3, ABQ_PLY_FABRIC_41, -45., PLY-12_LO-2_PC-1_1000_0
*Transverse Shear Stiffness
2250., 2250., 0.
*Distribution, name=MERGED_ORI-1-DISCORIENT, location=ELEMENT, Table=MERGED_ORI-1-DISCORIENT_Table
,           1.,           0.,           0.,           0.,           1.,           0.
1, -0.0653553158044815, 0.997862100601196,           0.,           0.,           0.,           1.
2, -0.191823050379753, 0.981429576873779,           0.,           0.,           0.,           1.
3, -0.311968624591827, 0.950092434883118,           0.,           0.,           0.,           1.
4, -0.426250070333481, 0.904605329036713,           0.,           0.,           0.,           1.
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11468, 0.999973773956299, -0.0072455215267837,           0., 7.0328576839529e-05, 0.00979978032410145, 0.999952018260956
*Distribution, name=MERGED_ORI-44-DISCORIENT, location=ELEMENT, Table=MERGED_ORI-44-DISCORIENT_Table
,           1.,           0.,           0.,           0.,           1.,           0.
11901,           0.,           1.,           0.,           0.,           0.,           1.
11902,           0.,           1.,           0.,           0.,           0.,           1.
11903,           0.,           1.,           0.,           0.,           0.,           1.
11904,           0.,           1.,           0.,           0.,           0.,           1.
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13610,           0.,           1.,           0.,           0.,           0.,           1.
*End Part
**
**
** ASSEMBLY
**
*Assembly, name=Assembly
**
*Instance, name=MERGED-1, part=MERGED
*End Instance
**
*Node
      1,         105.,         145.,   207.630005
*Nset, nset=CONSTRAINED_BOTTOM, instance=MERGED-1
    1,    2,    3,    4,   92,   93
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*Nset, nset=EDGESLO-1, instance=MERGED-1
    1,    2,  107,  108,  109,  260
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*Elset, elset=EDGESLO-1, instance=MERGED-1
  115,  116,  117,  118,  119,  120
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*Nset, nset=EDGESLO-2, instance=MERGED-1
 2967, 2969, 3295, 3296, 3402, 3403
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*Elset, elset=EDGESLO-2, instance=MERGED-1, generate
 12221,  12236,      1
*Nset, nset=SET-RP
 1,
*Nset, nset=_PICKEDSET884, internal
 1,
*Nset, nset=_PickedSet15, internal
 1,
*End Assembly
**
** ELEMENT CONTROLS
**
*Section Controls, name=EC-1, hourglass=ENHANCED
1., 1., 1.
*Amplitude, name=AMP-1, definition=SMOOTH STEP
             0.,              0.,              1.,              1.
**
** MATERIALS
**
*Material, name=ABQ_PLY_FABRIC_1
*Density
 1.58e-09,
*Depvar, delete=16
     16,
*User Material, constants=40
63600., 63600.,   0.03,  3690., 61000., 61000.,   0.03,     0.
  1046.,   595.,  1046.,   595.,   100.,     0.,     0.,     0.
   96.2,   32.5,   96.2,   32.5,     1.,    0.1,     0.,     0.
   100.,    40., 0.4158,     0.,     0.,     0.,     0.,     0.
     1.,   0.99, 0.3229,     0.,     0.,     0.,     0.,     0.
*Material, name=ABQ_PLY_FABRIC_2
*Density
 1.58e-09,
*Depvar, delete=16
     16,
*User Material, constants=40
63600., 63600.,   0.03,  3690., 61000., 61000.,   0.03,     0.
  1046.,   595.,  1046.,   595.,   100.,     0.,     0.,     0.
   96.2,   32.5,   96.2,   32.5,     1.,    0.1,     0.,     0.
   100.,    40., 0.4158,     0.,     0.,     0.,     0.,     0.
     1.,   0.99, 0.3229,     0.,     0.,     0.,     0.,     0.
*Material, name=ABQ_PLY_FABRIC_3
*Density
 1.58e-09,
*Depvar, delete=16
     16,
*User Material, constants=40
63600., 63600.,   0.03,  3690., 61000., 61000.,   0.03,     0.
  1046.,   595.,  1046.,   595.,   100.,     0.,     0.,     0.
   96.2,   32.5,   96.2,   32.5,     1.,    0.1,     0.,     0.
   100.,    40., 0.4158,     0.,     0.,     0.,     0.,     0.
     1.,   0.99, 0.3229,     0.,     0.,     0.,     0.,     0.
*Material, name=ABQ_PLY_FABRIC_4
*Density
 1.58e-09,
*Depvar, delete=16
     16,
*User Material, constants=40
63600., 63600.,   0.03,  3690., 61000., 61000.,   0.03,     0.
  1046.,   595.,  1046.,   595.,   100.,     0.,     0.,     0.
   96.2,   32.5,   96.2,   32.5,     1.,    0.1,     0.,     0.
   100.,    40., 0.4158,     0.,     0.,     0.,     0.,     0.
     1.,   0.99, 0.3229,     0.,     0.,     0.,     0.,     0.
*Material, name=ABQ_PLY_FABRIC_5
*Density
 1.58e-09,
*Depvar, delete=16
     16,
*User Material, constants=40
63600., 63600.,   0.03,  3690., 61000., 61000.,   0.03,     0.
  1046.,   595.,  1046.,   595.,   100.,     0.,     0.,     0.
   96.2,   32.5,   96.2,   32.5,     1.,    0.1,     0.,     0.
   100.,    40., 0.4158,     0.,     0.,     0.,     0.,     0.
     1.,   0.99, 0.3229,     0.,     0.,     0.,     0.,     0.
*Material, name=ABQ_PLY_FABRIC_6
*Density
 1.58e-09,
*Depvar, delete=16
     16,
*User Material, constants=40
63600., 63600.,   0.03,  3690., 61000., 61000.,   0.03,     0.
  1046.,   595.,  1046.,   595.,   100.,     0.,     0.,     0.
   96.2,   32.5,   96.2,   32.5,     1.,    0.1,     0.,     0.
   100.,    40., 0.4158,     0.,     0.,     0.,     0.,     0.
     1.,   0.99, 0.3229,     0.,     0.,     0.,     0.,     0.
*Material, name=ABQ_PLY_FABRIC_7
*Density
 1.58e-09,
*Depvar, delete=16
     16,
*User Material, constants=40
63600., 63600.,   0.03,  3690., 61000., 61000.,   0.03,     0.
  1046.,   595.,  1046.,   595.,   100.,     0.,     0.,     0.
   96.2,   32.5,   96.2,   32.5,     1.,    0.1,     0.,     0.
   100.,    40., 0.4158,     0.,     0.,     0.,     0.,     0.
     1.,   0.99, 0.3229,     0.,     0.,     0.,     0.,     0.
*Material, name=ABQ_PLY_FABRIC_8
*Density
 1.58e-09,
*Depvar, delete=16
     16,
*User Material, constants=40
63600., 63600.,   0.03,  3690., 61000., 61000.,   0.03,     0.
  1046.,   595.,  1046.,   595.,   100.,     0.,     0.,     0.
   96.2,   32.5,   96.2,   32.5,     1.,    0.1,     0.,     0.
   100.,    40., 0.4158,     0.,     0.,     0.,     0.,     0.
     1.,   0.99, 0.3229,     0.,     0.,     0.,     0.,     0.
*Material, name=ABQ_PLY_FABRIC_9
*Density
 1.58e-09,
*Depvar, delete=16
     16,
*User Material, constants=40
63600., 63600.,   0.03,  3690., 61000., 61000.,   0.03,     0.
  1046.,   595.,  1046.,   595.,   100.,     0.,     0.,     0.
   96.2,   32.5,   96.2,   32.5,     1.,    0.1,     0.,     0.
   100.,    40., 0.4158,     0.,     0.,     0.,     0.,     0.
     1.,   0.99, 0.3229,     0.,     0.,     0.,     0.,     0.
*Material, name=ABQ_PLY_FABRIC_10
*Density
 1.58e-09,
*Depvar, delete=16
     16,
*User Material, constants=40
63600., 63600.,   0.03,  3690., 61000., 61000.,   0.03,     0.
  1046.,   595.,  1046.,   595.,   100.,     0.,     0.,     0.
   96.2,   32.5,   96.2,   32.5,     1.,    0.1,     0.,     0.
   100.,    40., 0.4158,     0.,     0.,     0.,     0.,     0.
     1.,   0.99, 0.3229,     0.,     0.,     0.,     0.,     0.
*Material, name=ABQ_PLY_FABRIC_11
*Density
 1.58e-09,
*Depvar, delete=16
     16,
*User Material, constants=40
63600., 63600.,   0.03,  3690., 61000., 61000.,   0.03,     0.
  1046.,   595.,  1046.,   595.,   100.,     0.,     0.,     0.
   96.2,   32.5,   96.2,   32.5,     1.,    0.1,     0.,     0.
   100.,    40., 0.4158,     0.,     0.,     0.,     0.,     0.
     1.,   0.99, 0.3229,     0.,     0.,     0.,     0.,     0.
*Material, name=ABQ_PLY_FABRIC_12
*Density
 1.58e-09,
*Depvar, delete=16
     16,
*User Material, constants=40
63600., 63600.,   0.03,  3690., 61000., 61000.,   0.03,     0.
  1046.,   595.,  1046.,   595.,   100.,     0.,     0.,     0.
   96.2,   32.5,   96.2,   32.5,     1.,    0.1,     0.,     0.
   100.,    40., 0.4158,     0.,     0.,     0.,     0.,     0.
     1.,   0.99, 0.3229,     0.,     0.,     0.,     0.,     0.
*Material, name=ABQ_PLY_FABRIC_13
*Density
 1.58e-09,
*Depvar, delete=16
     16,
*User Material, constants=40
63600., 63600.,   0.03,  3690., 61000., 61000.,   0.03,     0.
  1046.,   595.,  1046.,   595.,   100.,     0.,     0.,     0.
   96.2,   32.5,   96.2,   32.5,     1.,    0.1,     0.,     0.
   100.,    40., 0.4158,     0.,     0.,     0.,     0.,     0.
     1.,   0.99, 0.3229,     0.,     0.,     0.,     0.,     0.
*Material, name=ABQ_PLY_FABRIC_14
*Density
 1.58e-09,
*Depvar, delete=16
     16,
*User Material, constants=40
63600., 63600.,   0.03,  3690., 61000., 61000.,   0.03,     0.
  1046.,   595.,  1046.,   595.,   100.,     0.,     0.,     0.
   96.2,   32.5,   96.2,   32.5,     1.,    0.1,     0.,     0.
   100.,    40., 0.4158,     0.,     0.,     0.,     0.,     0.
     1.,   0.99, 0.3229,     0.,     0.,     0.,     0.,     0.
*Material, name=ABQ_PLY_FABRIC_15
*Density
 1.58e-09,
*Depvar, delete=16
     16,
*User Material, constants=40
63600., 63600.,   0.03,  3690., 61000., 61000.,   0.03,     0.
  1046.,   595.,  1046.,   595.,   100.,     0.,     0.,     0.
   96.2,   32.5,   96.2,   32.5,     1.,    0.1,     0.,     0.
   100.,    40., 0.4158,     0.,     0.,     0.,     0.,     0.
     1.,   0.99, 0.3229,     0.,     0.,     0.,     0.,     0.
*Material, name=ABQ_PLY_FABRIC_16
*Density
 1.58e-09,
*Depvar, delete=16
     16,
*User Material, constants=40
63600., 63600.,   0.03,  3690., 61000., 61000.,   0.03,     0.
  1046.,   595.,  1046.,   595.,   100.,     0.,     0.,     0.
   96.2,   32.5,   96.2,   32.5,     1.,    0.1,     0.,     0.
   100.,    40., 0.4158,     0.,     0.,     0.,     0.,     0.
     1.,   0.99, 0.3229,     0.,     0.,     0.,     0.,     0.
*Material, name=ABQ_PLY_FABRIC_17
*Density
 1.58e-09,
*Depvar, delete=16
     16,
*User Material, constants=40
63600., 63600.,   0.03,  3690., 61000., 61000.,   0.03,     0.
  1046.,   595.,  1046.,   595.,   100.,     0.,     0.,     0.
   96.2,   32.5,   96.2,   32.5,     1.,    0.1,     0.,     0.
   100.,    40., 0.4158,     0.,     0.,     0.,     0.,     0.
     1.,   0.99, 0.3229,     0.,     0.,     0.,     0.,     0.
*Material, name=ABQ_PLY_FABRIC_18
*Density
 1.58e-09,
*Depvar, delete=16
     16,
*User Material, constants=40
63600., 63600.,   0.03,  3690., 61000., 61000.,   0.03,     0.
  1046.,   595.,  1046.,   595.,   100.,     0.,     0.,     0.
   96.2,   32.5,   96.2,   32.5,     1.,    0.1,     0.,     0.
   100.,    40., 0.4158,     0.,     0.,     0.,     0.,     0.
     1.,   0.99, 0.3229,     0.,     0.,     0.,     0.,     0.
*Material, name=ABQ_PLY_FABRIC_19
*Density
 1.58e-09,
*Depvar, delete=16
     16,
*User Material, constants=40
63600., 63600.,   0.03,  3690., 61000., 61000.,   0.03,     0.
  1046.,   595.,  1046.,   595.,   100.,     0.,     0.,     0.
   96.2,   32.5,   96.2,   32.5,     1.,    0.1,     0.,     0.
   100.,    40., 0.4158,     0.,     0.,     0.,     0.,     0.
     1.,   0.99, 0.3229,     0.,     0.,     0.,     0.,     0.
*Material, name=ABQ_PLY_FABRIC_20
*Density
 1.58e-09,
*Depvar, delete=16
     16,
*User Material, constants=40
63600., 63600.,   0.03,  3690., 61000., 61000.,   0.03,     0.
  1046.,   595.,  1046.,   595.,   100.,     0.,     0.,     0.
   96.2,   32.5,   96.2,   32.5,     1.,    0.1,     0.,     0.
   100.,    40., 0.4158,     0.,     0.,     0.,     0.,     0.
     1.,   0.99, 0.3229,     0.,     0.,     0.,     0.,     0.
*Material, name=ABQ_PLY_FABRIC_21
*Density
 1.58e-09,
*Depvar, delete=16
     16,
*User Material, constants=40
63600., 63600.,   0.03,  3690., 61000., 61000.,   0.03,     0.
  1046.,   595.,  1046.,   595.,   100.,     0.,     0.,     0.
   96.2,   32.5,   96.2,   32.5,     1.,    0.1,     0.,     0.
   100.,    40., 0.4158,     0.,     0.,     0.,     0.,     0.
     1.,   0.99, 0.3229,     0.,     0.,     0.,     0.,     0.
*Material, name=ABQ_PLY_FABRIC_22
*Density
 1.58e-09,
*Depvar, delete=16
     16,
*User Material, constants=40
63600., 63600.,   0.03,  3690., 61000., 61000.,   0.03,     0.
  1046.,   595.,  1046.,   595.,   100.,     0.,     0.,     0.
   96.2,   32.5,   96.2,   32.5,     1.,    0.1,     0.,     0.
   100.,    40., 0.4158,     0.,     0.,     0.,     0.,     0.
     1.,   0.99, 0.3229,     0.,     0.,     0.,     0.,     0.
*Material, name=ABQ_PLY_FABRIC_23
*Density
 1.58e-09,
*Depvar, delete=16
     16,
*User Material, constants=40
63600., 63600.,   0.03,  3690., 61000., 61000.,   0.03,     0.
  1046.,   595.,  1046.,   595.,   100.,     0.,     0.,     0.
   96.2,   32.5,   96.2,   32.5,     1.,    0.1,     0.,     0.
   100.,    40., 0.4158,     0.,     0.,     0.,     0.,     0.
     1.,   0.99, 0.3229,     0.,     0.,     0.,     0.,     0.
*Material, name=ABQ_PLY_FABRIC_24
*Density
 1.58e-09,
*Depvar, delete=16
     16,
*User Material, constants=40
63600., 63600.,   0.03,  3690., 61000., 61000.,   0.03,     0.
  1046.,   595.,  1046.,   595.,   100.,     0.,     0.,     0.
   96.2,   32.5,   96.2,   32.5,     1.,    0.1,     0.,     0.
   100.,    40., 0.4158,     0.,     0.,     0.,     0.,     0.
     1.,   0.99, 0.3229,     0.,     0.,     0.,     0.,     0.
*Material, name=ABQ_PLY_FABRIC_25
*Density
 1.58e-09,
*Depvar, delete=16
     16,
*User Material, constants=40
63600., 63600.,   0.03,  3690., 61000., 61000.,   0.03,     0.
  1046.,   595.,  1046.,   595.,   100.,     0.,     0.,     0.
   96.2,   32.5,   96.2,   32.5,     1.,    0.1,     0.,     0.
   100.,    40., 0.4158,     0.,     0.,     0.,     0.,     0.
     1.,   0.99, 0.3229,     0.,     0.,     0.,     0.,     0.
*Material, name=ABQ_PLY_FABRIC_26
*Density
 1.58e-09,
*Depvar, delete=16
     16,
*User Material, constants=40
63600., 63600.,   0.03,  3690., 61000., 61000.,   0.03,     0.
  1046.,   595.,  1046.,   595.,   100.,     0.,     0.,     0.
   96.2,   32.5,   96.2,   32.5,     1.,    0.1,     0.,     0.
   100.,    40., 0.4158,     0.,     0.,     0.,     0.,     0.
     1.,   0.99, 0.3229,     0.,     0.,     0.,     0.,     0.
*Material, name=ABQ_PLY_FABRIC_27
*Density
 1.58e-09,
*Depvar, delete=16
     16,
*User Material, constants=40
63600., 63600.,   0.03,  3690., 61000., 61000.,   0.03,     0.
  1046.,   595.,  1046.,   595.,   100.,     0.,     0.,     0.
   96.2,   32.5,   96.2,   32.5,     1.,    0.1,     0.,     0.
   100.,    40., 0.4158,     0.,     0.,     0.,     0.,     0.
     1.,   0.99, 0.3229,     0.,     0.,     0.,     0.,     0.
*Material, name=ABQ_PLY_FABRIC_28
*Density
 1.58e-09,
*Depvar, delete=16
     16,
*User Material, constants=40
63600., 63600.,   0.03,  3690., 61000., 61000.,   0.03,     0.
  1046.,   595.,  1046.,   595.,   100.,     0.,     0.,     0.
   96.2,   32.5,   96.2,   32.5,     1.,    0.1,     0.,     0.
   100.,    40., 0.4158,     0.,     0.,     0.,     0.,     0.
     1.,   0.99, 0.3229,     0.,     0.,     0.,     0.,     0.
*Material, name=ABQ_PLY_FABRIC_29
*Density
 1.58e-09,
*Depvar, delete=16
     16,
*User Material, constants=40
63600., 63600.,   0.03,  3690., 61000., 61000.,   0.03,     0.
  1046.,   595.,  1046.,   595.,   100.,     0.,     0.,     0.
   96.2,   32.5,   96.2,   32.5,     1.,    0.1,     0.,     0.
   100.,    40., 0.4158,     0.,     0.,     0.,     0.,     0.
     1.,   0.99, 0.3229,     0.,     0.,     0.,     0.,     0.
*Material, name=ABQ_PLY_FABRIC_30
*Density
 1.58e-09,
*Depvar, delete=16
     16,
*User Material, constants=40
63600., 63600.,   0.03,  3690., 61000., 61000.,   0.03,     0.
  1046.,   595.,  1046.,   595.,   100.,     0.,     0.,     0.
   96.2,   32.5,   96.2,   32.5,     1.,    0.1,     0.,     0.
   100.,    40., 0.4158,     0.,     0.,     0.,     0.,     0.
     1.,   0.99, 0.3229,     0.,     0.,     0.,     0.,     0.
*Material, name=ABQ_PLY_FABRIC_31
*Density
 1.58e-09,
*Depvar, delete=16
     16,
*User Material, constants=40
63600., 63600.,   0.03,  3690., 61000., 61000.,   0.03,     0.
  1046.,   595.,  1046.,   595.,   100.,     0.,     0.,     0.
   96.2,   32.5,   96.2,   32.5,     1.,    0.1,     0.,     0.
   100.,    40., 0.4158,     0.,     0.,     0.,     0.,     0.
     1.,   0.99, 0.3229,     0.,     0.,     0.,     0.,     0.
*Material, name=ABQ_PLY_FABRIC_32
*Density
 1.58e-09,
*Depvar, delete=16
     16,
*User Material, constants=40
63600., 63600.,   0.03,  3690., 61000., 61000.,   0.03,     0.
  1046.,   595.,  1046.,   595.,   100.,     0.,     0.,     0.
   96.2,   32.5,   96.2,   32.5,     1.,    0.1,     0.,     0.
   100.,    40., 0.4158,     0.,     0.,     0.,     0.,     0.
     1.,   0.99, 0.3229,     0.,     0.,     0.,     0.,     0.
*Material, name=ABQ_PLY_FABRIC_33
*Density
 1.58e-09,
*Depvar, delete=16
     16,
*User Material, constants=40
63600., 63600.,   0.03,  3690., 61000., 61000.,   0.03,     0.
  1046.,   595.,  1046.,   595.,   100.,     0.,     0.,     0.
   96.2,   32.5,   96.2,   32.5,     1.,    0.1,     0.,     0.
   100.,    40., 0.4158,     0.,     0.,     0.,     0.,     0.
     1.,   0.99, 0.3229,     0.,     0.,     0.,     0.,     0.
*Material, name=ABQ_PLY_FABRIC_34
*Density
 1.58e-09,
*Depvar, delete=16
     16,
*User Material, constants=40
63600., 63600.,   0.03,  3690., 61000., 61000.,   0.03,     0.
  1046.,   595.,  1046.,   595.,   100.,     0.,     0.,     0.
   96.2,   32.5,   96.2,   32.5,     1.,    0.1,     0.,     0.
   100.,    40., 0.4158,     0.,     0.,     0.,     0.,     0.
     1.,   0.99, 0.3229,     0.,     0.,     0.,     0.,     0.
*Material, name=ABQ_PLY_FABRIC_35
*Density
 1.58e-09,
*Depvar, delete=16
     16,
*User Material, constants=40
63600., 63600.,   0.03,  3690., 61000., 61000.,   0.03,     0.
  1046.,   595.,  1046.,   595.,   100.,     0.,     0.,     0.
   96.2,   32.5,   96.2,   32.5,     1.,    0.1,     0.,     0.
   100.,    40., 0.4158,     0.,     0.,     0.,     0.,     0.
     1.,   0.99, 0.3229,     0.,     0.,     0.,     0.,     0.
*Material, name=ABQ_PLY_FABRIC_36
*Density
 1.58e-09,
*Depvar, delete=16
     16,
*User Material, constants=40
63600., 63600.,   0.03,  3690., 61000., 61000.,   0.03,     0.
  1046.,   595.,  1046.,   595.,   100.,     0.,     0.,     0.
   96.2,   32.5,   96.2,   32.5,     1.,    0.1,     0.,     0.
   100.,    40., 0.4158,     0.,     0.,     0.,     0.,     0.
     1.,   0.99, 0.3229,     0.,     0.,     0.,     0.,     0.
*Material, name=ABQ_PLY_FABRIC_37
*Density
 1.58e-09,
*Depvar, delete=16
     16,
*User Material, constants=40
63600., 63600.,   0.03,  3690., 61000., 61000.,   0.03,     0.
  1046.,   595.,  1046.,   595.,   100.,     0.,     0.,     0.
   96.2,   32.5,   96.2,   32.5,     1.,    0.1,     0.,     0.
   100.,    40., 0.4158,     0.,     0.,     0.,     0.,     0.
     1.,   0.99, 0.3229,     0.,     0.,     0.,     0.,     0.
*Material, name=ABQ_PLY_FABRIC_38
*Density
 1.58e-09,
*Depvar, delete=16
     16,
*User Material, constants=40
63600., 63600.,   0.03,  3690., 61000., 61000.,   0.03,     0.
  1046.,   595.,  1046.,   595.,   100.,     0.,     0.,     0.
   96.2,   32.5,   96.2,   32.5,     1.,    0.1,     0.,     0.
   100.,    40., 0.4158,     0.,     0.,     0.,     0.,     0.
     1.,   0.99, 0.3229,     0.,     0.,     0.,     0.,     0.
*Material, name=ABQ_PLY_FABRIC_39
*Density
 1.58e-09,
*Depvar, delete=16
     16,
*User Material, constants=40
63600., 63600.,   0.03,  3690., 61000., 61000.,   0.03,     0.
  1046.,   595.,  1046.,   595.,   100.,     0.,     0.,     0.
   96.2,   32.5,   96.2,   32.5,     1.,    0.1,     0.,     0.
   100.,    40., 0.4158,     0.,     0.,     0.,     0.,     0.
     1.,   0.99, 0.3229,     0.,     0.,     0.,     0.,     0.
*Material, name=ABQ_PLY_FABRIC_40
*Density
 1.58e-09,
*Depvar, delete=16
     16,
*User Material, constants=40
63600., 63600.,   0.03,  3690., 61000., 61000.,   0.03,     0.
  1046.,   595.,  1046.,   595.,   100.,     0.,     0.,     0.
   96.2,   32.5,   96.2,   32.5,     1.,    0.1,     0.,     0.
   100.,    40., 0.4158,     0.,     0.,     0.,     0.,     0.
     1.,   0.99, 0.3229,     0.,     0.,     0.,     0.,     0.
*Material, name=ABQ_PLY_FABRIC_41
*Density
 1.58e-09,
*Depvar, delete=16
     16,
*User Material, constants=40
63600., 63600.,   0.03,  3690., 61000., 61000.,   0.03,     0.
  1046.,   595.,  1046.,   595.,   100.,     0.,     0.,     0.
   96.2,   32.5,   96.2,   32.5,     1.,    0.1,     0.,     0.
   100.,    40., 0.4158,     0.,     0.,     0.,     0.,     0.
     1.,   0.99, 0.3229,     0.,     0.,     0.,     0.,     0.
**
** INTERACTION PROPERTIES
**
*Surface Interaction, name=CZASURFINT-1
*Friction
 0.25,
*Surface Behavior, pressure-overclosure=HARD
*Distribution Table, name=MERGED_ORI-1-DISCORIENT_Table
coord3d, coord3d
*Distribution Table, name=MERGED_ORI-44-DISCORIENT_Table
coord3d, coord3d
**
** BOUNDARY CONDITIONS
**
** Name: Disp-BC-1 Type: Displacement/Rotation
*Boundary
CONSTRAINED_BOTTOM, 1, 1
** Name: Disp-BC-2 Type: Displacement/Rotation
*Boundary
CONSTRAINED_BOTTOM, 2, 2
** Name: Disp-BC-3 Type: Displacement/Rotation
*Boundary
CONSTRAINED_BOTTOM, 3, 3
** Name: Disp-BC-4 Type: Displacement/Rotation
*Boundary
CONSTRAINED_BOTTOM, 4, 4
** Name: Disp-BC-5 Type: Displacement/Rotation
*Boundary
CONSTRAINED_BOTTOM, 5, 5
** Name: Disp-BC-6 Type: Displacement/Rotation
*Boundary
CONSTRAINED_BOTTOM, 6, 6
** ----------------------------------------------------------------
**
** STEP: Step-1
**
*Step, name=Step-1, nlgeom=YES
*Dynamic, Explicit
, 1.
*Bulk Viscosity
0.06, 1.2
** Mass Scaling: Semi-Automatic
**               Whole Model
*Variable Mass Scaling, dt=3e-06, type=below min, frequency=1
**
** BOUNDARY CONDITIONS
**
** Name: Disp-BC-7 Type: Displacement/Rotation
*Boundary
SET-RP, 1, 1
** Name: Disp-BC-8 Type: Displacement/Rotation
*Boundary
SET-RP, 2, 2
** Name: Disp-BC-9 Type: Displacement/Rotation
*Boundary
SET-RP, 4, 4
** Name: Disp-BC-10 Type: Displacement/Rotation
*Boundary
SET-RP, 5, 5
** Name: Disp-BC-11 Type: Displacement/Rotation
*Boundary
SET-RP, 6, 6
** Name: Vel-BC-1 Type: Velocity/Angular velocity
*Boundary, amplitude=AMP-1, type=VELOCITY
SET-RP, 3, 3, -500.
**
** INTERACTIONS
**
** Interaction: general_contact
*Contact, op=NEW
*Contact Inclusions, ALL EXTERIOR
*Contact Property Assignment
 ,  , CZASURFINT-1
**
** OUTPUT REQUESTS
**
*Restart, write, number interval=1, time marks=NO
**
** FIELD OUTPUT: F-Output-1
**
*Output, field, number interval=200
*Node Output
A, RF, U, V
**
** FIELD OUTPUT: F-Output-2
**
*Element Output, directions=YES
EEQUT, EVF, LE, MVF, PE, PEEQ, PEEQVAVG, PEVAVG, S, SDV, SEQUT, STATUS, STH, SVAVG, TE, TEEQ
TEVOL
**
** HISTORY OUTPUT: H-Output-1
**
*Output, history, time interval=0.00125
*Energy Output
ALLAE, ALLCD, ALLDMD, ALLFD, ALLIE, ALLKE, ALLPD, ALLPW, ALLSE, ALLVD, ALLWK, ETOTAL
**
** HISTORY OUTPUT: H-Output-2
**
*Node Output, nset=SET-RP
A3, RF3, U3, V3
*End Step
